*Heading
 Geometry-only visible roll/electrode assembly
** Job name: visible_roll_electrode Model name: visible_roll_electrode
** Generated by: Abaqus/CAE 2025
*Preprint, echo=NO, model=NO, history=NO, contact=NO
**
** PARTS
**
*Part, name=P_COATING
*Node
      1,         650., 0.0250000004,          60.
      2,           0., 0.0250000004,          60.
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*Element, type=C3D8R
 1,   5, 139, 188,   8,   1,  89, 138,   4
 2, 139, 140, 187, 188,  89,  90, 137, 138
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*Nset, nset=ALL_COATING, generate
    1,  1188,     1
*Elset, elset=ALL_COATING, generate
   1,  780,    1
*Nset, nset=SET_SYM_X0
  2,  3,  6,  7, 11, 12
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*Elset, elset=SET_SYM_X0
  26,  52,  78, 104, 130, 156
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*Nset, nset=SET_ELECTRODE_INLET
   79,   80,   81,   82,   85,   86
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*Elset, elset=SET_ELECTRODE_INLET
 677, 678, 679, 680, 681, 682
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*Nset, nset=SET_ELECTRODE_OUTLET
  17,  18,  19,  20,  21,  22
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*Elset, elset=SET_ELECTRODE_OUTLET, generate
  53,  130,    1
*Elset, elset=_S_COATING_TOP_S4, internal
  27,  28,  29,  30,  31,  32
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*Elset, elset=_S_COATING_TOP_S5, internal
 287, 288, 289, 290, 291, 292
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*Elset, elset=_S_COATING_TOP_S6, internal
 547, 548, 549, 550, 551, 552
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*Surface, type=ELEMENT, name=S_COATING_TOP
_S_COATING_TOP_S4, S4
_S_COATING_TOP_S5, S5
_S_COATING_TOP_S6, S6
** Section: SEC_COATING
*Solid Section, elset=ALL_COATING, material=COATING_DPC
,
*End Part
**
*Part, name=P_COLLECTOR
*Node
      1,         675.,           0.,          60.
      2,         675., 0.00749999983,          60.
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*Element, type=C3D8R
 1,  96, 123, 122,  45,   1,   2,   3,   4
 2,  95, 124, 121,  46,  96, 123, 122,  45
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*Nset, nset=ALL_COLLECTOR, generate
   1,  616,    1
*Elset, elset=ALL_COLLECTOR, generate
   1,  270,    1
*Nset, nset=SET_SYM_X0
  5,  6,  7,  8, 13, 14
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*Elset, elset=SET_SYM_X0
  27,  54,  81, 108, 109, 162, 163, 216, 217, 244
*Nset, nset=SET_SYM_Y0
   1,   4,   7,   8,  10,  11
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*Elset, elset=SET_SYM_Y0, generate
   1,  270,    1
*Nset, nset=SET_ELECTRODE_INLET
  41,  42,  43,  44, 565, 566
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*Elset, elset=SET_ELECTRODE_INLET, generate
 244,  270,    1
*Nset, nset=SET_ELECTRODE_OUTLET
   3,   4,   6,   7,  45,  46
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*Elset, elset=SET_ELECTRODE_OUTLET, generate
  1,  27,   1
** Section: SEC_COLLECTOR
*Solid Section, elset=ALL_COLLECTOR, material=COLLECTOR_AL
,
*End Part
**
*Part, name=P_ROLL_ANALYTIC_RIGID
*End Part
**
**
** ASSEMBLY
**
*Assembly, name=Assembly
**
*Instance, name=COLLECTOR-1, part=P_COLLECTOR
          0.,           0.,         -40.
*End Instance
**
*Instance, name=COATING-1, part=P_COATING
          0.,       0.0075,         -40.
*End Instance
**
*Instance, name=ROLL-1, part=P_ROLL_ANALYTIC_RIGID
          0.,     450.0825,           0.
          0.,     450.0825,           0.,           0.,     450.0825,          -1.,          90.
*Node
      1,           0.,        337.5,           0.
*Nset, nset=ROLL-1-RefPt_, internal
1,
*Nset, nset=RP_ROLL
 1,
*Surface, type=REVOLUTION, name=S_ROLL
START,         450.,           0.
 LINE,         450.,         675.
*Rigid Body, ref node=ROLL-1-RefPt_, analytical surface=S_ROLL
*End Instance
**
*Nset, nset=RP_ROLL, instance=ROLL-1
 1,
*Nset, nset=SET_ELECTRODE_INLET, instance=COLLECTOR-1
  41,  42,  43,  44, 565, 566
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*Nset, nset=SET_ELECTRODE_INLET, instance=COATING-1
   79,   80,   81,   82,   85,   86
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*Elset, elset=SET_ELECTRODE_INLET, instance=COLLECTOR-1, generate
 244,  270,    1
*Elset, elset=SET_ELECTRODE_INLET, instance=COATING-1
 677, 678, 679, 680, 681, 682
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*Nset, nset=SET_ELECTRODE_INLET_COATING, instance=COATING-1
   79,   80,   81,   82,   85,   86
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*Elset, elset=SET_ELECTRODE_INLET_COATING, instance=COATING-1
 677, 678, 679, 680, 681, 682
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*Nset, nset=SET_ELECTRODE_INLET_COLLECTOR, instance=COLLECTOR-1
  41,  42,  43,  44, 565, 566
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*Elset, elset=SET_ELECTRODE_INLET_COLLECTOR, instance=COLLECTOR-1, generate
 244,  270,    1
*Nset, nset=SET_ELECTRODE_OUTLET, instance=COLLECTOR-1
   3,   4,   6,   7,  45,  46
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*Nset, nset=SET_ELECTRODE_OUTLET, instance=COATING-1
  17,  18,  19,  20,  21,  22
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*Elset, elset=SET_ELECTRODE_OUTLET, instance=COLLECTOR-1, generate
  1,  27,   1
*Elset, elset=SET_ELECTRODE_OUTLET, instance=COATING-1, generate
  53,  130,    1
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*Elset, elset=_S_COATING_TOP_S4, internal, instance=COATING-1
  27,  28,  29,  30,  31,  32
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*Elset, elset=_S_COATING_TOP_S5, internal, instance=COATING-1
 287, 288, 289, 290, 291, 292
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*Elset, elset=_S_COATING_TOP_S6, internal, instance=COATING-1
 547, 548, 549, 550, 551, 552
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*Surface, type=ELEMENT, name=S_COATING_TOP
_S_COATING_TOP_S4, S4
_S_COATING_TOP_S5, S5
_S_COATING_TOP_S6, S6
*End Assembly
**
** MATERIALS
**
*Material, name=COATING_DPC
*Cap Plasticity
65.,   4.,  0.8, 0.01
*Cap Hardening
 55.,    0.
 58.,  0.05
 62.,   0.1
 72.,  0.15
 95.,   0.2
140.,  0.23
220.,  0.26
370.,  0.29
740., 0.325
*Density
 2.55e-09,
*Elastic
6500., 0.01
*Material, name=COLLECTOR_AL
*Density
 2.7e-09,
*Elastic
72000., 0.33
*Material, name=ROLL_STEEL
*Density
 7.93e-09,
*Elastic
193000., 0.2
