*Heading
 Clear display model; electrode Y scale is magnified.
** Job name: visible_roll_electrode_clear Model name: visible_roll_electrode_clear
** Generated by: Abaqus/CAE 2025
*Preprint, echo=NO, model=NO, history=NO, contact=NO
**
** PARTS
**
*Part, name=P_COATING_DISPLAY
*Node
      1,         650.,          25.,          60.
      2,           0.,          25.,          60.
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*Element, type=C3D8R
  1,    5,  221, 3181,  352,    1,   89, 3053,  220
  2,  221,  222, 3182, 3181,   89,   90, 3054, 3053
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*Nset, nset=ALL_COATING, generate
    1,  8580,     1
*Elset, elset=ALL_COATING, generate
    1,  7020,     1
** Section: SEC_COATING
*Solid Section, elset=ALL_COATING, material=COATING_DPC
,
*End Part
**
*Part, name=P_COLLECTOR_DISPLAY
*Node
      1,         675.,           0.,          60.
      2,         675.,          7.5,          60.
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*Element, type=C3D8R
  1,  182,  250, 1594, 1527,    1,    2,   45,   46
  2, 1527, 1594,  249,   49,   46,   45,    3,    4
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*Nset, nset=ALL_COLLECTOR, generate
    1,  1794,     1
*Elset, elset=ALL_COLLECTOR, generate
   1,  816,    1
** Section: SEC_COLLECTOR
*Solid Section, elset=ALL_COLLECTOR, material=COLLECTOR_AL
,
*End Part
**
*Part, name=P_ROLL_DISPLAY_SHELL
*Node
      1,   447.763855,  -44.8055305,         675.
      2,   441.077606,  -89.1657639,         675.
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*Element, type=S4R
  1,   63,    1,   64,  126
  2,    1,    2,   65,   64
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*Node
   1009,           0.,           0.,        337.5
*Nset, nset=P_ROLL_DISPLAY_SHELL-RefPt_, internal
1009,
*Nset, nset=ALL_ROLL_DISPLAY, generate
    1,  1008,     1
*Elset, elset=ALL_ROLL_DISPLAY, generate
   1,  945,    1
*Nset, nset=RP_ROLL
 1009,
*Elset, elset=_S_ROLL_SPOS, internal, generate
   1,  945,    1
*Surface, type=ELEMENT, name=S_ROLL
_S_ROLL_SPOS, SPOS
** Section: SEC_ROLL_DISPLAY
*Shell Section, elset=ALL_ROLL_DISPLAY, material=ROLL_STEEL_DISPLAY
2., 5
*End Part
**
**
** ASSEMBLY
**
*Assembly, name=Assembly
**
*Instance, name=COLLECTOR-1, part=P_COLLECTOR_DISPLAY
          0.,           0.,         -40.
*End Instance
**
*Instance, name=COATING-1, part=P_COATING_DISPLAY
          0.,          7.5,         -40.
*End Instance
**
*Instance, name=ROLL-1, part=P_ROLL_DISPLAY_SHELL
          0.,        532.5,           0.
          0.,        532.5,           0.,           0.,        533.5,           0.,          90.
*End Instance
**
*Nset, nset=RP_ROLL, instance=ROLL-1
 1009,
*Nset, nset=SET_ELECTRODE_INLET, instance=COLLECTOR-1
   41,   42,   43,   44, 1393, 1394
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*Nset, nset=SET_ELECTRODE_INLET, instance=COATING-1
   79,   80,   81,   82,   85,   86
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*Elset, elset=SET_ELECTRODE_INLET, instance=COLLECTOR-1, generate
 682,  816,    2
*Elset, elset=SET_ELECTRODE_INLET, instance=COATING-1
 5656, 5657, 5658, 5659, 5660, 5661
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*Nset, nset=SET_ELECTRODE_INLET_COATING, instance=COATING-1
   79,   80,   81,   82,   85,   86
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*Elset, elset=SET_ELECTRODE_INLET_COATING, instance=COATING-1
 5656, 5657, 5658, 5659, 5660, 5661
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*Nset, nset=SET_ELECTRODE_INLET_COLLECTOR, instance=COLLECTOR-1
   41,   42,   43,   44, 1393, 1394
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*Elset, elset=SET_ELECTRODE_INLET_COLLECTOR, instance=COLLECTOR-1, generate
 682,  816,    2
*Nset, nset=SET_ELECTRODE_OUTLET, instance=COLLECTOR-1
   3,   4,   6,   7,  49,  50
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*Nset, nset=SET_ELECTRODE_OUTLET, instance=COATING-1
   17,   18,   19,   20,   21,   22
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*Elset, elset=SET_ELECTRODE_OUTLET, instance=COLLECTOR-1, generate
   2,  136,    2
*Elset, elset=SET_ELECTRODE_OUTLET, instance=COATING-1
  586,  587,  588,  589,  590,  591
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*Elset, elset=_S_COATING_TOP_S4, internal, instance=COATING-1
  198,  201,  204,  207,  210,  213
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*Elset, elset=_S_COATING_TOP_S5, internal, instance=COATING-1
 2861, 2862, 2863, 2864, 2865, 2866
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*Elset, elset=_S_COATING_TOP_S6, internal, instance=COATING-1
 4681, 4684, 4687, 4690, 4693, 4696
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*Surface, type=ELEMENT, name=S_COATING_TOP
_S_COATING_TOP_S4, S4
_S_COATING_TOP_S5, S5
_S_COATING_TOP_S6, S6
*Elset, elset=_S_ROLL_SPOS, internal, instance=ROLL-1, generate
   1,  945,    1
*Surface, type=ELEMENT, name=S_ROLL
_S_ROLL_SPOS, SPOS
*End Assembly
**
** MATERIALS
**
*Material, name=COATING_DPC
*Cap Plasticity
65.,   4.,  0.8, 0.01
*Cap Hardening
 55.,    0.
 58.,  0.05
 62.,   0.1
 72.,  0.15
 95.,   0.2
140.,  0.23
220.,  0.26
370.,  0.29
740., 0.325
*Density
 2.55e-09,
*Elastic
6500., 0.01
*Material, name=COLLECTOR_AL
*Density
 2.7e-09,
*Elastic
72000., 0.33
*Material, name=ROLL_STEEL_DISPLAY
*Density
 7.93e-09,
*Elastic
193000., 0.2
