*Heading
** Job name: Job-1 Model name: SelfSupport_DPC_LocalStaticPress_Ch3_1
** Generated by: Abaqus/CAE 2025
*Preprint, echo=NO, model=NO, history=NO, contact=NO
**
** PARTS
**
*Part, name=BOTTOMROLLER
*Node
      1,          -6., -0.115001775,         -12.
      2,          -6., -0.115001775,       -11.25
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*Element, type=R3D4
   1,    1,    2,   35,   34
   2,    2,    3,   36,   35
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*Nset, nset=BOTTOMROLLER_RP
 5314,
*Elset, elset=BOTTOMROLLER_ALL_ELEMS, generate
    1,  5120,     1
*End Part
**
*Part, name=FILM
*Node
      1,          -5., -0.075000003,         -10.
      2,          -5., -0.075000003,          -9.
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*Element, type=C3D8R
    1,     1,   127,   148,    22,     2,   128,   149,    23
    2,     2,   128,   149,    23,     3,   129,   150,    24
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*Nset, nset=TOP_NODES
   106,   107,   108,   109,   110,   111
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*Nset, nset=BOTTOM_NODES
     1,     2,     3,     4,     5,     6
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*Nset, nset=PIN_X
 11,
*Nset, nset=PIN_Z_A
 11,
*Nset, nset=PIN_Z_B
 14501,
*Elset, elset=FILM_ALL_ELEMS, generate
     1,  11500,      1
*Elset, elset=FILM_TOP_FACE_ELEMS
    81,    82,    83,    84,    85,    86
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*Elset, elset=FILM_BOTTOM_FACE_ELEMS
     1,     2,     3,     4,     5,     6
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** Section: Section-1-FILM_ALL_ELEMS
*Solid Section, elset=FILM_ALL_ELEMS, material=DRYSELFSUPPORTFILM_DPC
,
*End Part
**
*Part, name=TOPROLLER
*Node
      1,          -6.,  0.115001775,         -12.
      2,          -6.,  0.115001775,       -11.25
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*Element, type=R3D4
   1,    1,   34,   35,    2
   2,    2,   35,   36,    3
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*Nset, nset=TOPROLLER_RP
 5314,
*Elset, elset=TOPROLLER_ALL_ELEMS, generate
    1,  5120,     1
*End Part
**
**
** ASSEMBLY
**
*Assembly, name=Assembly
**
*Instance, name=FILM-1, part=FILM
*End Instance
**
*Instance, name=TOPROLLER-1, part=TOPROLLER
*End Instance
**
*Instance, name=BOTTOMROLLER-1, part=BOTTOMROLLER
*End Instance
**
*Nset, nset=BOTTOMROLLER_RP, instance=BOTTOMROLLER-1
 5314,
*Nset, nset=FILM_BOTTOM_NODES, instance=FILM-1
     1,     2,     3,     4,     5,     6
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*Nset, nset=FILM_TOP_NODES, instance=FILM-1
   106,   107,   108,   109,   110,   111
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*Nset, nset=PIN_X_NODE, instance=FILM-1
 11,
*Nset, nset=PIN_Z_NODE_A, instance=FILM-1
 11,
*Nset, nset=PIN_Z_NODE_B, instance=FILM-1
 14501,
*Nset, nset=TOPROLLER_RP, instance=TOPROLLER-1
 5314,
*Nset, nset=_PickedSet19, internal, instance=TOPROLLER-1
 5314,
*Nset, nset=_PickedSet21, internal, instance=BOTTOMROLLER-1
 5314,
*Elset, elset=_BOTTOMROLLER_CONTACT_SURF_SPOS, internal, instance=BOTTOMROLLER-1, generate
    1,  5120,     1
*Elset, elset=_BOTTOMROLLER_CONTACT_SURF_SNEG, internal, instance=BOTTOMROLLER-1, generate
    1,  5120,     1
*Surface, type=ELEMENT, name=BOTTOMROLLER_CONTACT_SURF
_BOTTOMROLLER_CONTACT_SURF_SPOS, SPOS
_BOTTOMROLLER_CONTACT_SURF_SNEG, SNEG
*Elset, elset=_FILM_BOTTOM_SURF_S3, internal, instance=FILM-1
     1,     2,     3,     4,     5,     6
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*Surface, type=ELEMENT, name=FILM_BOTTOM_SURF
_FILM_BOTTOM_SURF_S3, S3
*Elset, elset=_FILM_TOP_SURF_S5, internal, instance=FILM-1
    81,    82,    83,    84,    85,    86
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*Surface, type=ELEMENT, name=FILM_TOP_SURF
_FILM_TOP_SURF_S5, S5
*Elset, elset=_TOPROLLER_CONTACT_SURF_SPOS, internal, instance=TOPROLLER-1, generate
    1,  5120,     1
*Elset, elset=_TOPROLLER_CONTACT_SURF_SNEG, internal, instance=TOPROLLER-1, generate
    1,  5120,     1
*Surface, type=ELEMENT, name=TOPROLLER_CONTACT_SURF
_TOPROLLER_CONTACT_SURF_SPOS, SPOS
_TOPROLLER_CONTACT_SURF_SNEG, SNEG
** Constraint: RigidBody-1
*Rigid Body, ref node=_PickedSet19, elset=TOPROLLER-1.TOPROLLER_ALL_ELEMS
** Constraint: RigidBody-2
*Rigid Body, ref node=_PickedSet21, elset=BOTTOMROLLER-1.BOTTOMROLLER_ALL_ELEMS
*End Assembly
**
** MATERIALS
**
** COMMENTS FROM *CAP PLASTICITY
** =============================
**
**  Drucker-Prager Cap材料参数映射：
**  *Cap Plasticity: cohesion_d, friction_angle_beta, cap_eccentricity_R,
**  initial_cap_position(按需求取Cap hardening第一行压力),
**  transition_surface_radius_alpha, flow_stress_ratio_K
*Material, name=DRYSELFSUPPORTFILM_DPC
*Cap Plasticity
1.,  40.,  0.8,   2., 0.02,   1.
*Cap Hardening
  2.,   0.
 2.5, 0.02
 3.5, 0.05
  5., 0.08
 6.5,  0.1
 10., 0.15
 16.,  0.2
*Elastic
20., 0.1
**
** INTERACTION PROPERTIES
**
*Surface Interaction, name=ROLLERFILMCONTACT
1.,
*Friction, slip tolerance=0.005
 0.05,
*Surface Behavior, pressure-overclosure=HARD
**
** BOUNDARY CONDITIONS
**
** Name: Disp-BC-1 Type: 位移/转角
*Boundary
BOTTOMROLLER_RP, 1, 1
BOTTOMROLLER_RP, 2, 2
BOTTOMROLLER_RP, 3, 3
BOTTOMROLLER_RP, 4, 4
BOTTOMROLLER_RP, 5, 5
BOTTOMROLLER_RP, 6, 6
** Name: Disp-BC-2 Type: 位移/转角
*Boundary
TOPROLLER_RP, 1, 1
** Name: Disp-BC-3 Type: 位移/转角
*Boundary
TOPROLLER_RP, 3, 3
TOPROLLER_RP, 4, 4
TOPROLLER_RP, 5, 5
TOPROLLER_RP, 6, 6
** Name: Disp-BC-4 Type: 位移/转角
*Boundary
PIN_X_NODE, 1, 1
** Name: Disp-BC-5 Type: 位移/转角
*Boundary
PIN_Z_NODE_A, 3, 3
** Name: Disp-BC-6 Type: 位移/转角
*Boundary
PIN_Z_NODE_B, 3, 3
**
** INTERACTIONS
**
** Interaction: ROLLERFILMCONTACT-1
*Contact Pair, interaction=ROLLERFILMCONTACT, type=SURFACE TO SURFACE
FILM_TOP_SURF, TOPROLLER_CONTACT_SURF
** Interaction: ROLLERFILMCONTACT-2
*Contact Pair, interaction=ROLLERFILMCONTACT, type=SURFACE TO SURFACE
FILM_BOTTOM_SURF, BOTTOMROLLER_CONTACT_SURF
** ----------------------------------------------------------------
**
** STEP: Clamp_Down
**
*Step, name=Clamp_Down, nlgeom=YES
*Static, stabilize=0.0001, allsdtol=0, continue=NO
0.01, 1., 1e-08, 0.05
**
** BOUNDARY CONDITIONS
**
** Name: Disp-BC-7 Type: 位移/转角
*Boundary
TOPROLLER_RP, 2, 2, -0.015
**
** OUTPUT REQUESTS
**
*Restart, write, frequency=0
**
** FIELD OUTPUT: F-Output-3
**
*Output, field
*Contact Output, variable=PRESELECT
**
** FIELD OUTPUT: F-Output-2
**
*Element Output, directions=YES
EVOL, LE, PE, PEEQ, PRESS, S
**
** FIELD OUTPUT: F-Output-1
**
*Node Output
U,
**
** HISTORY OUTPUT: H-Output-2
**
*Output, history
*Energy Output
ALLIE, ALLPD, ALLSD
**
** HISTORY OUTPUT: H-Output-1
**
*Node Output, nset=TOPROLLER_RP
RF2, U2
*End Step
** ----------------------------------------------------------------
**
** STEP: Hold
**
*Step, name=Hold, nlgeom=YES
*Static, stabilize=0.0001, allsdtol=0, continue=NO
0.01, 1., 1e-08, 0.05
**
** BOUNDARY CONDITIONS
**
** Name: Disp-BC-1 Type: 位移/转角
*Boundary, op=NEW
BOTTOMROLLER_RP, 1, 1
BOTTOMROLLER_RP, 2, 2
BOTTOMROLLER_RP, 3, 3
BOTTOMROLLER_RP, 4, 4
BOTTOMROLLER_RP, 5, 5
BOTTOMROLLER_RP, 6, 6
** Name: Disp-BC-2 Type: 位移/转角
*Boundary, op=NEW
TOPROLLER_RP, 1, 1
** Name: Disp-BC-3 Type: 位移/转角
*Boundary, op=NEW
TOPROLLER_RP, 3, 3
TOPROLLER_RP, 4, 4
TOPROLLER_RP, 5, 5
TOPROLLER_RP, 6, 6
** Name: Disp-BC-4 Type: 位移/转角
*Boundary, op=NEW
PIN_X_NODE, 1, 1
** Name: Disp-BC-5 Type: 位移/转角
*Boundary, op=NEW
PIN_Z_NODE_A, 3, 3
** Name: Disp-BC-6 Type: 位移/转角
*Boundary, op=NEW
PIN_Z_NODE_B, 3, 3
** Name: Disp-BC-7 Type: 位移/转角
*Boundary, op=NEW
** Name: Disp-BC-8 Type: 位移/转角
*Boundary, op=NEW
TOPROLLER_RP, 2, 2, -0.015
**
** OUTPUT REQUESTS
**
*Restart, write, frequency=0
**
** FIELD OUTPUT: F-Output-6
**
*Output, field
*Contact Output, variable=PRESELECT
**
** FIELD OUTPUT: F-Output-5
**
*Element Output, directions=YES
EVOL, LE, PE, PEEQ, PRESS, S
**
** FIELD OUTPUT: F-Output-4
**
*Node Output
U,
**
** HISTORY OUTPUT: H-Output-4
**
*Output, history
*Energy Output
ALLIE, ALLPD, ALLSD
**
** HISTORY OUTPUT: H-Output-3
**
*Node Output, nset=TOPROLLER_RP
RF2, U2
*End Step
** ----------------------------------------------------------------
**
** STEP: Unload
**
*Step, name=Unload, nlgeom=YES
*Static, stabilize=0.0001, allsdtol=0, continue=NO
0.01, 1., 1e-08, 0.05
**
** BOUNDARY CONDITIONS
**
** Name: Disp-BC-1 Type: 位移/转角
*Boundary, op=NEW
BOTTOMROLLER_RP, 1, 1
BOTTOMROLLER_RP, 2, 2
BOTTOMROLLER_RP, 3, 3
BOTTOMROLLER_RP, 4, 4
BOTTOMROLLER_RP, 5, 5
BOTTOMROLLER_RP, 6, 6
** Name: Disp-BC-2 Type: 位移/转角
*Boundary, op=NEW
TOPROLLER_RP, 1, 1
** Name: Disp-BC-3 Type: 位移/转角
*Boundary, op=NEW
TOPROLLER_RP, 3, 3
TOPROLLER_RP, 4, 4
TOPROLLER_RP, 5, 5
TOPROLLER_RP, 6, 6
** Name: Disp-BC-4 Type: 位移/转角
*Boundary, op=NEW
PIN_X_NODE, 1, 1
** Name: Disp-BC-5 Type: 位移/转角
*Boundary, op=NEW
PIN_Z_NODE_A, 3, 3
** Name: Disp-BC-6 Type: 位移/转角
*Boundary, op=NEW
PIN_Z_NODE_B, 3, 3
** Name: Disp-BC-8 Type: 位移/转角
*Boundary, op=NEW
** Name: Disp-BC-9 Type: 位移/转角
*Boundary, op=NEW
TOPROLLER_RP, 2, 2
**
** OUTPUT REQUESTS
**
*Restart, write, frequency=0
**
** FIELD OUTPUT: F-Output-9
**
*Output, field
*Contact Output, variable=PRESELECT
**
** FIELD OUTPUT: F-Output-8
**
*Element Output, directions=YES
EVOL, LE, PE, PEEQ, PRESS, S
**
** FIELD OUTPUT: F-Output-7
**
*Node Output
U,
**
** HISTORY OUTPUT: H-Output-6
**
*Output, history
*Energy Output
ALLIE, ALLPD, ALLSD
**
** HISTORY OUTPUT: H-Output-5
**
*Node Output, nset=TOPROLLER_RP
RF2, U2
*End Step
