*Heading
** Job name: SelfSupport_DPC_LocalStaticPress_20pct_Ch3_1 Model name: SelfSupport_DPC_LocalStaticPress_20pct_Ch3_1
** 单层干法自支撑电极膜局部静态法向压下模型；无集流体、无转动、无进料、无显式动力学。
*Part, name=Film
*Node
1, -5, -0.075, -10
2, -5, -0.075, -9
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*Element, type=C3D8R, elset=FILM_ALL_ELEMS
1, 1, 127, 148, 22, 2, 128, 149, 23
2, 2, 128, 149, 23, 3, 129, 150, 24
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*Nset, nset=TOP_NODES
106, 107, 108, 109, 110, 111
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*Nset, nset=BOTTOM_NODES
1, 2, 3, 4, 5, 6
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*Nset, nset=PIN_X
11
*Nset, nset=PIN_Z_A
11
*Nset, nset=PIN_Z_B
14501
*Elset, elset=FILM_ALL_ELEMS
1, 2, 3, 4, 5, 6
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*Elset, elset=FILM_TOP_FACE_ELEMS
81, 82, 83, 84, 85, 86
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*Elset, elset=FILM_BOTTOM_FACE_ELEMS
1, 2, 3, 4, 5, 6
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*Solid Section, elset=FILM_ALL_ELEMS, material=DrySelfSupportFilm_DPC
,
*End Part
*Part, name=TopRoller
*Node
1, -6, 0.115001777936, -12
2, -6, 0.115001777936, -11.25
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*Element, type=R3D4, elset=TOPROLLER_ALL_ELEMS
1, 1, 34, 35, 2
2, 2, 35, 36, 3
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*Nset, nset=TOPROLLER_RP
5314
*Elset, elset=TOPROLLER_ALL_ELEMS
1, 2, 3, 4, 5, 6
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*End Part
*Part, name=BottomRoller
*Node
1, -6, -0.115001777936, -12
2, -6, -0.115001777936, -11.25
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*Element, type=R3D4, elset=BOTTOMROLLER_ALL_ELEMS
1, 1, 2, 35, 34
2, 2, 3, 36, 35
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*Nset, nset=BOTTOMROLLER_RP
5314
*Elset, elset=BOTTOMROLLER_ALL_ELEMS
1, 2, 3, 4, 5, 6
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*End Part
**
** ASSEMBLY
**
*Assembly, name=Assembly
*Instance, name=Film-1, part=Film
*End Instance
*Instance, name=TopRoller-1, part=TopRoller
*End Instance
*Instance, name=BottomRoller-1, part=BottomRoller
*End Instance
*Nset, nset=FILM_TOP_NODES, instance=Film-1
106, 107, 108, 109, 110, 111
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*Nset, nset=FILM_BOTTOM_NODES, instance=Film-1
1, 2, 3, 4, 5, 6
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*Nset, nset=PIN_X_NODE, instance=Film-1
11
*Nset, nset=PIN_Z_NODE_A, instance=Film-1
11
*Nset, nset=PIN_Z_NODE_B, instance=Film-1
14501
*Nset, nset=TOPROLLER_RP, instance=TopRoller-1
5314
*Nset, nset=BOTTOMROLLER_RP, instance=BottomRoller-1
5314
*Surface, type=ELEMENT, name=FILM_TOP_SURF
Film-1.FILM_TOP_FACE_ELEMS, S5
*Surface, type=ELEMENT, name=FILM_BOTTOM_SURF
Film-1.FILM_BOTTOM_FACE_ELEMS, S3
*Surface, type=ELEMENT, name=TOPROLLER_CONTACT_SURF
TopRoller-1.TOPROLLER_ALL_ELEMS, SPOS
TopRoller-1.TOPROLLER_ALL_ELEMS, SNEG
*Surface, type=ELEMENT, name=BOTTOMROLLER_CONTACT_SURF
BottomRoller-1.BOTTOMROLLER_ALL_ELEMS, SPOS
BottomRoller-1.BOTTOMROLLER_ALL_ELEMS, SNEG
*Rigid Body, ref node=TOPROLLER_RP, elset=TopRoller-1.TOPROLLER_ALL_ELEMS
*Rigid Body, ref node=BOTTOMROLLER_RP, elset=BottomRoller-1.BOTTOMROLLER_ALL_ELEMS
*End Assembly
**
** MATERIALS
**
*Material, name=DrySelfSupportFilm_DPC
*Elastic
20, 0.1
** Drucker-Prager Cap材料参数映射：
** *Cap Plasticity: cohesion_d, friction_angle_beta, cap_eccentricity_R,
** initial_cap_position(按需求取Cap hardening第一行压力),
** transition_surface_radius_alpha, flow_stress_ratio_K
*Cap Plasticity
1, 40, 0.8, 2, 0.02, 1
*Cap Hardening
2, 0
2.5, 0.02
3.5, 0.05
5, 0.08
6.5, 0.1
10, 0.15
16, 0.2
**
** INTERACTIONS
**
*Surface Interaction, name=RollerFilmContact
*Surface Behavior, pressure-overclosure=HARD
*Friction
0.05
*Contact Pair, interaction=RollerFilmContact, type=SURFACE TO SURFACE
FILM_TOP_SURF, TOPROLLER_CONTACT_SURF
*Contact Pair, interaction=RollerFilmContact, type=SURFACE TO SURFACE
FILM_BOTTOM_SURF, BOTTOMROLLER_CONTACT_SURF
**
** INITIAL BOUNDARY CONDITIONS
**
*Boundary
BOTTOMROLLER_RP, 1, 6, 0.
TOPROLLER_RP, 1, 1, 0.
TOPROLLER_RP, 3, 6, 0.
PIN_X_NODE, 1, 1, 0.
PIN_Z_NODE_A, 3, 3, 0.
PIN_Z_NODE_B, 3, 3, 0.
** ----------------------------------------------------------------
*Step, name=Clamp_Down, nlgeom=YES
*Static, stabilize=0.0001
0.01, 1, 1e-08, 0.05
*Boundary
TOPROLLER_RP, 2, 2, -0.03
*Output, field
*Node Output
U
*Element Output, directions=YES
S, LE, PE, PEEQ, PRESS, EVOL
** 接触输出目标变量：CPRESS, CSHEAR1, CSHEAR2, COPEN；
** 当前求解器关键字形式使用PRESELECT，避免显式变量名不被该选项接受而中断。
*Contact Output, variable=PRESELECT
*Output, history
*Node Output, nset=TOPROLLER_RP
U2, RF2
*Energy Output
ALLIE, ALLPD, ALLSD
*End Step
** ----------------------------------------------------------------
*Step, name=Hold, nlgeom=YES
*Static, stabilize=0.0001
0.01, 1, 1e-08, 0.05
*Boundary
TOPROLLER_RP, 2, 2, -0.03
*Output, field
*Node Output
U
*Element Output, directions=YES
S, LE, PE, PEEQ, PRESS, EVOL
** 接触输出目标变量：CPRESS, CSHEAR1, CSHEAR2, COPEN；
** 当前求解器关键字形式使用PRESELECT，避免显式变量名不被该选项接受而中断。
*Contact Output, variable=PRESELECT
*Output, history
*Node Output, nset=TOPROLLER_RP
U2, RF2
*Energy Output
ALLIE, ALLPD, ALLSD
*End Step
** ----------------------------------------------------------------
*Step, name=Unload, nlgeom=YES
*Static, stabilize=0.0001
0.01, 1, 1e-08, 0.05
*Boundary
TOPROLLER_RP, 2, 2, 0
*Output, field
*Node Output
U
*Element Output, directions=YES
S, LE, PE, PEEQ, PRESS, EVOL
** 接触输出目标变量：CPRESS, CSHEAR1, CSHEAR2, COPEN；
** 当前求解器关键字形式使用PRESELECT，避免显式变量名不被该选项接受而中断。
*Contact Output, variable=PRESELECT
*Output, history
*Node Output, nset=TOPROLLER_RP
U2, RF2
*Energy Output
ALLIE, ALLPD, ALLSD
*End Step
