*Heading
 单层自支撑膜三维局部静态辊压等效模型
** Job name: SelfSupport_YanshanParam_LocalStaticPress Model name: SelfSupport_YanshanParam_LocalStaticPress
** Generated by: Abaqus/CAE 2025
*Preprint, echo=NO, model=NO, history=NO, contact=NO
**
** PARTS
**
*Part, name=Film
*Node
      1,           5.,  0.075000003,          50.
      2,           5., 0.0450000018,          50.
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*Element, type=C3D8R
    1,   307,   308,   314,   313,     1,     2,     8,     7
    2,   308,   309,   315,   314,     2,     3,     9,     8
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*Nset, nset=ALL_FILM, generate
     1,  15606,      1
*Elset, elset=ALL_FILM, generate
     1,  12500,      1
*Nset, nset=FILM_XSYM, generate
 15301,  15606,      1
*Elset, elset=FILM_XSYM, generate
 12251,  12500,      1
*Nset, nset=FILM_ZSYM
   301,   302,   303,   304,   305,   306
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*Elset, elset=FILM_ZSYM
   246,   247,   248,   249,   250,   496
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*Nset, nset=FILM_Y_DRIFT_ANCHOR
 6,
*Elset, elset=_FILM_TOP_S6, internal, generate
     1,  12496,      5
*Surface, type=ELEMENT, name=FILM_TOP
_FILM_TOP_S6, S6
*Elset, elset=_FILM_BOTTOM_S4, internal, generate
     5,  12500,      5
*Surface, type=ELEMENT, name=FILM_BOTTOM
_FILM_BOTTOM_S4, S4
** Section: FilmSection
*Solid Section, elset=ALL_FILM, controls=EC-1, material=SelfSupportingFilm_DPC_reference
,
*End Part
**
*Part, name=LowerRoll
*Node
      1,           0., -0.075000003,           0.
      2,           0., -0.075000003,          10.
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*Element, type=C3D8R
   1,    1,  211,  212,    2,    8,  218,  219,    9
   2,    2,  212,  213,    3,    9,  219,  220,   10
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*Elset, elset=ALL_LOWERROLL, generate
    1,  5916,     1
*Nset, nset=LOWERROLL_XSYM, generate
   1,  210,    1
*Nset, nset=LOWERROLL_ZSYM, generate
    1,  7344,     7
*Elset, elset=_LOWERROLL_CONTACT_S1, internal
    1,    2,    3,    4,    5,    6
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*Surface, type=ELEMENT, name=LOWERROLL_CONTACT
_LOWERROLL_CONTACT_S1, S1
*Elset, elset=_LOWERROLL_BEARING_END_S5, internal, generate
    6,  5916,     6
*Surface, type=ELEMENT, name=LOWERROLL_BEARING_END
_LOWERROLL_BEARING_END_S5, S5
** Section: RollSection
*Solid Section, elset=ALL_LOWERROLL, material=ElasticSteel_Roll
,
*End Part
**
*Part, name=UpperRoll
*Node
      1,           0.,  0.075000003,           0.
      2,           0.,  0.075000003,          10.
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*Element, type=C3D8R
   1,    1,    2,  212,  211,    8,    9,  219,  218
   2,    2,    3,  213,  212,    9,   10,  220,  219
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*Elset, elset=ALL_UPPERROLL, generate
    1,  5916,     1
*Nset, nset=UPPERROLL_XSYM, generate
   1,  210,    1
*Nset, nset=UPPERROLL_ZSYM, generate
    1,  7344,     7
*Elset, elset=_UPPERROLL_CONTACT_S1, internal
    1,    2,    3,    4,    5,    6
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*Surface, type=ELEMENT, name=UPPERROLL_CONTACT
_UPPERROLL_CONTACT_S1, S1
*Elset, elset=_UPPERROLL_BEARING_END_S4, internal, generate
    6,  5916,     6
*Surface, type=ELEMENT, name=UPPERROLL_BEARING_END
_UPPERROLL_BEARING_END_S4, S4
** Section: RollSection
*Solid Section, elset=ALL_UPPERROLL, material=ElasticSteel_Roll
,
*End Part
**
**
** ASSEMBLY
**
*Assembly, name=Assembly
**
*Instance, name=Film-1, part=Film
*End Instance
**
*Instance, name=UpperRoll-1, part=UpperRoll
*End Instance
**
*Instance, name=LowerRoll-1, part=LowerRoll
*End Instance
**
*Node
      1,           0.,   450.075012,          55.
*Node
      2,           0.,  -450.075012,          55.
*Nset, nset=LOWER_ROLL_RP
 2,
*Nset, nset=UPPER_ROLL_RP
 1,
** Constraint: Lower_RP_to_BearingEnd
*Coupling, constraint name=Lower_RP_to_BearingEnd, ref node=LOWER_ROLL_RP, surface=LowerRoll-1.LOWERROLL_BEARING_END
*Distributing, coupling=CONTINUUM, rotational coupling=CONTINUUM, weighting method=UNIFORM
1, 1
2, 2
3, 3
** Constraint: Upper_RP_to_BearingEnd
*Coupling, constraint name=Upper_RP_to_BearingEnd, ref node=UPPER_ROLL_RP, surface=UpperRoll-1.UPPERROLL_BEARING_END
*Distributing, coupling=CONTINUUM, rotational coupling=CONTINUUM, weighting method=UNIFORM
1, 1
2, 2
3, 3
*End Assembly
**
** ELEMENT CONTROLS
**
*Section Controls, name=EC-1, hourglass=ENHANCED
1., 1., 1.
**
** MATERIALS
**
*Material, name=ElasticSteel_Roll
*Elastic
193000., 0.2
*Material, name=SelfSupportingFilm_DPC_reference
*Cap Plasticity
4.,  65.,  0.8,  60., 0.02,   1.
*Cap Hardening
 60.,   0.
 62., 0.05
 66.,  0.1
 72., 0.15
 80., 0.18
 90.,  0.2
110., 0.22
140., 0.24
190., 0.26
270., 0.28
390.,  0.3
480., 0.31
600., 0.32
740., 0.33
*Elastic
6500., 0.01
**
** INTERACTION PROPERTIES
**
*Surface Interaction, name=Roll_Film_Friction
1.,
*Friction, slip tolerance=0.005
 0.15,
*Surface Behavior, pressure-overclosure=HARD
**
** BOUNDARY CONDITIONS
**
** Name: BC_FILM_XSYM Type: 对称/反对称/完全固定
*Boundary
Film-1.FILM_XSYM, XSYMM
** Name: BC_FILM_ZSYM Type: 对称/反对称/完全固定
*Boundary
Film-1.FILM_ZSYM, ZSYMM
** Name: BC_Film_Y_Drift_Anchor Type: 位移/转角
*Boundary
Film-1.FILM_Y_DRIFT_ANCHOR, 2, 2
** Name: BC_LOWERROLL_XSYM Type: 对称/反对称/完全固定
*Boundary
LowerRoll-1.LOWERROLL_XSYM, XSYMM
** Name: BC_LOWERROLL_ZSYM Type: 对称/反对称/完全固定
*Boundary
LowerRoll-1.LOWERROLL_ZSYM, ZSYMM
** Name: BC_Lower_RP_Fixed Type: 位移/转角
*Boundary
LOWER_ROLL_RP, 1, 1
LOWER_ROLL_RP, 2, 2
LOWER_ROLL_RP, 3, 3
** Name: BC_UPPERROLL_XSYM Type: 对称/反对称/完全固定
*Boundary
UpperRoll-1.UPPERROLL_XSYM, XSYMM
** Name: BC_UPPERROLL_ZSYM Type: 对称/反对称/完全固定
*Boundary
UpperRoll-1.UPPERROLL_ZSYM, ZSYMM
** Name: BC_Upper_RP_Press Type: 位移/转角
*Boundary
UPPER_ROLL_RP, 1, 1
UPPER_ROLL_RP, 2, 2
UPPER_ROLL_RP, 3, 3
**
** INTERACTIONS
**
** Interaction: LowerRoll_to_Film
*Contact Pair, interaction=Roll_Film_Friction, type=SURFACE TO SURFACE
Film-1.FILM_BOTTOM, LowerRoll-1.LOWERROLL_CONTACT
** Interaction: UpperRoll_to_Film
*Contact Pair, interaction=Roll_Film_Friction, type=SURFACE TO SURFACE
Film-1.FILM_TOP, UpperRoll-1.UPPERROLL_CONTACT
** ----------------------------------------------------------------
**
** STEP: Clamp_Down
**
*Step, name=Clamp_Down, nlgeom=YES, inc=120
*Static
0.025, 1., 1e-08, 0.05
**
** BOUNDARY CONDITIONS
**
** Name: BC_Upper_RP_Press Type: 位移/转角
*Boundary
UPPER_ROLL_RP, 2, 2, -0.015
**
** OUTPUT REQUESTS
**
*Restart, write, frequency=0
**
** FIELD OUTPUT: ContactOutputs
**
*Output, field, frequency=99999
*Contact Output
CSTRESS, CDISP
**
** FIELD OUTPUT: FieldOutputs
**
*Node Output
U,
*Element Output, directions=YES
EVOL, LE, PE, PEEQ, S
**
** HISTORY OUTPUT: Energy_History
**
*Output, history
*Energy Output
ALLIE, ALLPD, ALLSD
**
** HISTORY OUTPUT: Upper_RP_U2_RF2
**
*Node Output, nset=UPPER_ROLL_RP
RF2, U2
*End Step
** ----------------------------------------------------------------
**
** STEP: Hold
**
*Step, name=Hold, nlgeom=YES, inc=20
*Static
1., 1., 1e-08, 1.
**
** BOUNDARY CONDITIONS
**
** Name: BC_Upper_RP_Press Type: 位移/转角
*Boundary
UPPER_ROLL_RP, 2, 2, -0.015
**
** OUTPUT REQUESTS
**
*Restart, write, frequency=0
**
** FIELD OUTPUT: ContactOutputs
**
*Output, field, frequency=99999
*Contact Output
CSTRESS, CDISP
**
** FIELD OUTPUT: FieldOutputs
**
*Node Output
U,
*Element Output, directions=YES
EVOL, LE, PE, PEEQ, S
**
** HISTORY OUTPUT: Energy_History
**
*Output, history
*Energy Output
ALLIE, ALLPD, ALLSD
**
** HISTORY OUTPUT: Upper_RP_U2_RF2
**
*Node Output, nset=UPPER_ROLL_RP
RF2, U2
*End Step
** ----------------------------------------------------------------
**
** STEP: Unload
**
*Step, name=Unload, nlgeom=YES, inc=1000
*Static, stabilize=0.1, allsdtol=0
0.0125, 1., 1e-08, 0.025
**
** BOUNDARY CONDITIONS
**
** Name: BC_Upper_RP_Press Type: 位移/转角
*Boundary
UPPER_ROLL_RP, 2, 2
**
** INTERACTIONS
**
** Interaction: UpperRoll_to_Film
*Model Change, type=CONTACT PAIR, remove
Film-1.FILM_TOP, UpperRoll-1.UPPERROLL_CONTACT
**
** OUTPUT REQUESTS
**
*Restart, write, frequency=0
**
** FIELD OUTPUT: ContactOutputs
**
*Output, field, frequency=99999
*Contact Output
CSTRESS, CDISP
**
** FIELD OUTPUT: FieldOutputs
**
*Node Output
U,
*Element Output, directions=YES
EVOL, LE, PE, PEEQ, S
**
** HISTORY OUTPUT: Energy_History
**
*Output, history
*Energy Output
ALLIE, ALLPD, ALLSD
**
** HISTORY OUTPUT: Upper_RP_U2_RF2
**
*Node Output, nset=UPPER_ROLL_RP
RF2, U2
*End Step
