*Heading
 Local static symmetric normal press model with rigid rollers
** Job name: RollPress_Static_LocalSym_50mm_RigidRoller Model name: RollPress_Static_LocalSym_50mm_RigidRoller
** Generated by: Abaqus/CAE 2025
*Preprint, echo=NO, model=NO, history=NO, contact=NO
**
** PARTS
**
*Part, name=ActiveLayer
*Node
      1,          50.,           0.,         12.5
      2,          50.,  0.150000006,         12.5
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*Element, type=C3D8R
  1,   90,  499, 1431,  347,    1,   21,  315,   36
  2,  499,  500, 1432, 1431,   21,   22,  316,  315
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*Nset, nset=_PickedSet8, internal, generate
    1,  2646,     1
*Elset, elset=_PickedSet8, internal, generate
    1,  2000,     1
*Nset, nset=XSymFace
    5,    6,    7,    8,   13,   14
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*Elset, elset=XSymFace
  476,  477,  478,  479,  480,  481
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*Nset, nset=ZSymFace
   17,   18,   19,   20,  263,  264
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*Elset, elset=ZSymFace
 1711, 1712, 1713, 1714, 1715, 1726
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*Elset, elset=_Top_S4, internal
    5,   10,   15,   20,   25,   30
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*Elset, elset=_Top_S6, internal, generate
  501,  1696,     5
*Surface, type=ELEMENT, name=Top
_Top_S4, S4
_Top_S6, S6
*Elset, elset=_Bottom_S4, internal, generate
  505,  1700,     5
*Elset, elset=_Bottom_S6, internal
    1,    6,   11,   16,   21,   26
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*Surface, type=ELEMENT, name=Bottom
_Bottom_S4, S4
_Bottom_S6, S6
** Section: Sec_ActiveLayer
*Solid Section, elset=_PickedSet8, material=ActiveLayer_Porous_Calibratable
,
*End Part
**
*Part, name=RigidRoller_CylindricalShell
*Node
      1,   49.7592354,  -4.90085697,          70.
      2,   49.0392647,  -9.75451565,          70.
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*Element, type=R3D4
  1,  64,   1,  65, 128
  2,   1,   2,  66,  65
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*Elset, elset=_ContactFace_SNEG, internal, generate
   1,  896,    1
*Surface, type=ELEMENT, name=ContactFace
_ContactFace_SNEG, SNEG
*End Part
**
**
** ASSEMBLY
**
*Assembly, name=Assembly
**
*Instance, name=ActiveLayer-1, part=ActiveLayer
*End Instance
**
*Instance, name=LowerRoller-1, part=RigidRoller_CylindricalShell
          0.,         -50.,           0.
          0.,         -50.,           0.,           0.,         -49.,           0.,          90.
*End Instance
**
*Instance, name=UpperRoller-1, part=RigidRoller_CylindricalShell
          0.,        50.15,           0.
          0.,        50.15,           0.,           0.,        51.15,           0.,          90.
*End Instance
**
*Node
      1,           0.,   50.1500015,           0.
*Node
      2,           0.,         -50.,           0.
*Nset, nset=RP_LowerRoller
 2,
*Nset, nset=RP_UpperRoller
 1,
*Nset, nset=Sheet_All, instance=ActiveLayer-1, generate
    1,  2646,     1
*Elset, elset=Sheet_All, instance=ActiveLayer-1, generate
    1,  2000,     1
*Nset, nset=Sheet_XSymFace, instance=ActiveLayer-1
    5,    6,    7,    8,   13,   14
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*Elset, elset=Sheet_XSymFace, instance=ActiveLayer-1
  476,  477,  478,  479,  480,  481
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*Nset, nset=Sheet_ZSymFace, instance=ActiveLayer-1
   17,   18,   19,   20,  263,  264
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*Elset, elset=Sheet_ZSymFace, instance=ActiveLayer-1
 1711, 1712, 1713, 1714, 1715, 1726
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*Nset, nset=_PickedSet19, internal, instance=UpperRoller-1, generate
   1,  960,    1
*Elset, elset=_PickedSet19, internal, instance=UpperRoller-1, generate
   1,  896,    1
*Nset, nset=_PickedSet20, internal, instance=LowerRoller-1, generate
   1,  960,    1
*Elset, elset=_PickedSet20, internal, instance=LowerRoller-1, generate
   1,  896,    1
*Elset, elset=_LowerRoller_Contact_SPOS, internal, instance=LowerRoller-1, generate
   1,  896,    1
*Elset, elset=_LowerRoller_Contact_SNEG, internal, instance=LowerRoller-1, generate
   1,  896,    1
*Surface, type=ELEMENT, name=LowerRoller_Contact
_LowerRoller_Contact_SPOS, SPOS
_LowerRoller_Contact_SNEG, SNEG
*Elset, elset=_Sheet_Bottom_S4, internal, instance=ActiveLayer-1, generate
  505,  1700,     5
*Elset, elset=_Sheet_Bottom_S6, internal, instance=ActiveLayer-1
    1,    6,   11,   16,   21,   26
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*Surface, type=ELEMENT, name=Sheet_Bottom
_Sheet_Bottom_S4, S4
_Sheet_Bottom_S6, S6
*Elset, elset=_Sheet_Top_S4, internal, instance=ActiveLayer-1
    5,   10,   15,   20,   25,   30
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*Elset, elset=_Sheet_Top_S6, internal, instance=ActiveLayer-1, generate
  501,  1696,     5
*Surface, type=ELEMENT, name=Sheet_Top
_Sheet_Top_S4, S4
_Sheet_Top_S6, S6
*Elset, elset=_UpperRoller_Contact_SPOS, internal, instance=UpperRoller-1, generate
   1,  896,    1
*Elset, elset=_UpperRoller_Contact_SNEG, internal, instance=UpperRoller-1, generate
   1,  896,    1
*Surface, type=ELEMENT, name=UpperRoller_Contact
_UpperRoller_Contact_SPOS, SPOS
_UpperRoller_Contact_SNEG, SNEG
** Constraint: Rigid_LowerRoller
*Rigid Body, ref node=RP_LowerRoller, elset=_PickedSet20
** Constraint: Rigid_UpperRoller
*Rigid Body, ref node=RP_UpperRoller, elset=_PickedSet19
*Elset, elset=__GeneralContact_RollerSheet_gcs0_22_SPOS, internal, instance=LowerRoller-1, generate
   1,  896,    1
*Surface, type=ELEMENT, name=_GeneralContact_RollerSheet_gcs0_22, internal
__GeneralContact_RollerSheet_gcs0_22_SPOS, SPOS
*Elset, elset=__GeneralContact_RollerSheet_gcs0_23_SNEG, internal, instance=LowerRoller-1, generate
   1,  896,    1
*Surface, type=ELEMENT, name=_GeneralContact_RollerSheet_gcs0_23, internal
__GeneralContact_RollerSheet_gcs0_23_SNEG, SNEG
*Elset, elset=__GeneralContact_RollerSheet_gcs0_24_SPOS, internal, instance=UpperRoller-1, generate
   1,  896,    1
*Surface, type=ELEMENT, name=_GeneralContact_RollerSheet_gcs0_24, internal
__GeneralContact_RollerSheet_gcs0_24_SPOS, SPOS
*Elset, elset=__GeneralContact_RollerSheet_gcs0_25_SNEG, internal, instance=UpperRoller-1, generate
   1,  896,    1
*Surface, type=ELEMENT, name=_GeneralContact_RollerSheet_gcs0_25, internal
__GeneralContact_RollerSheet_gcs0_25_SNEG, SNEG
*End Assembly
*Amplitude, name=Amp_Upper_Drop, definition=SMOOTH STEP
             0.,              0.,              1.,              1.
**
** MATERIALS
**
*Material, name=ActiveLayer_Porous_Calibratable
*Cap Plasticity
 0.0032,    5.,   0.8, 0.048,  0.02,    1.
*Cap Hardening
  0.048,   0.
 0.0496, 0.05
 0.0528,  0.1
 0.0576, 0.15
  0.064, 0.18
  0.072,  0.2
  0.088, 0.22
  0.112, 0.24
  0.152, 0.26
  0.216, 0.28
  0.312,  0.3
  0.384, 0.31
   0.48, 0.32
  0.592, 0.33
*Density
 2.55e-09,
*Elastic
6500., 0.01
**
** INTERACTION PROPERTIES
**
*Surface Interaction, name=Contact_Roller_Active_mu0p1
1.,
*Friction, slip tolerance=0.005
 0.1,
*Surface Behavior, pressure-overclosure=HARD
**
** BOUNDARY CONDITIONS
**
** Name: BC_Lower_RP_Fixed Type: 位移/转角
*Boundary
RP_LowerRoller, 1, 1
RP_LowerRoller, 2, 2
RP_LowerRoller, 3, 3
RP_LowerRoller, 4, 4
RP_LowerRoller, 5, 5
RP_LowerRoller, 6, 6
** Name: BC_Sheet_XSym Type: 对称/反对称/完全固定
*Boundary
Sheet_XSymFace, XSYMM
** Name: BC_Sheet_ZSym Type: 对称/反对称/完全固定
*Boundary
Sheet_ZSymFace, ZSYMM
** Name: BC_Upper_RP_Guide Type: 位移/转角
*Boundary
RP_UpperRoller, 1, 1
RP_UpperRoller, 3, 3
RP_UpperRoller, 5, 5
RP_UpperRoller, 6, 6
**
** INTERACTIONS
**
** Interaction: GeneralContact_RollerSheet
*Contact
*Contact Inclusions, ALL EXTERIOR
*Contact Property Assignment
 ,  , Contact_Roller_Active_mu0p1
*Surface Property Assignment, property=GEOMETRIC CORRECTION
_GeneralContact_RollerSheet_gcs0_22, Circumferential, 0., -50., 0.,  1., -50., 6.12323e-17
_GeneralContact_RollerSheet_gcs0_23, Circumferential, 0., -50., 0.,  1., -50., 6.12323e-17
_GeneralContact_RollerSheet_gcs0_24, Circumferential, 0., 50.15, 0.,  1., 50.15, 6.12323e-17
_GeneralContact_RollerSheet_gcs0_25, Circumferential, 0., 50.15, 0.,  1., 50.15, 6.12323e-17
** ----------------------------------------------------------------
**
** STEP: Press_Down
**
*Step, name=Press_Down, nlgeom=YES, inc=10000
*Static, stabilize=0.0002, allsdtol=0, continue=NO
0.001, 1., 1e-12, 0.005
**
** BOUNDARY CONDITIONS
**
** Name: BC_Upper_RP_Drop Type: 位移/转角
*Boundary, amplitude=Amp_Upper_Drop
RP_UpperRoller, 2, 2, -0.015
**
** OUTPUT REQUESTS
**
*Restart, write, frequency=0
**
** FIELD OUTPUT: F_Sheet_StressStrainContact
**
*Output, field, number interval=40, time marks=NO
*Node Output, nset=Sheet_All
RF, U
*Element Output, elset=Sheet_All, directions=YES
LE, PE, PEEQ, S
*Contact Output, nset=Sheet_All
CSTATUS, CSTRESS
**
** HISTORY OUTPUT: H-Output-1
**
*Output, history, variable=PRESELECT
**
** HISTORY OUTPUT: H_LowerRoller_RP
**
*Output, history, number interval=100, time marks=NO
*Node Output, nset=RP_LowerRoller
RF1, RF2, RF3, RM1, RM2, RM3, U1, U2
U3, UR1
**
** HISTORY OUTPUT: H_UpperRoller_RP
**
*Node Output, nset=RP_UpperRoller
RF1, RF2, RF3, RM1, RM2, RM3, U1, U2
U3, UR1
*End Step
