*Heading
 Active-layer material compression and unloading calibration model
** Job name: Yang_Macro_ActiveLayer_Compression Model name: Yang_Macro_ActiveLayer_Compression
** Generated by: Abaqus/CAE 2025
*Preprint, echo=NO, model=NO, history=NO, contact=NO
**
** PARTS
**
*Part, name=ActiveLayer
*Node
      1,          0.5,  0.075000003,           1.
      2,          0.5, 0.0450000018,           1.
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*Element, type=C3D8R
  1,  67,  68,  74,  73,   1,   2,   8,   7
  2,  68,  69,  75,  74,   2,   3,   9,   8
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*Nset, nset=ACTIVE_LAYER_ALL, generate
   1,  726,    1
*Elset, elset=ACTIVE_LAYER_ALL, generate
   1,  500,    1
*Nset, nset=TOP_SURFACE_NODES, generate
   1,  721,    6
*Nset, nset=BOTTOM_SURFACE_NODES, generate
   6,  726,    6
*Nset, nset=DRIFT_CORNER_A
 726,
*Nset, nset=DRIFT_CORNER_B
 66,
*Elset, elset=_ACTIVE_TOP_S6, internal, generate
   1,  496,    5
*Surface, type=ELEMENT, name=ACTIVE_TOP
_ACTIVE_TOP_S6, S6
*Elset, elset=_ACTIVE_BOTTOM_S4, internal, generate
   5,  500,    5
*Surface, type=ELEMENT, name=ACTIVE_BOTTOM
_ACTIVE_BOTTOM_S4, S4
** Section: ActiveLayerSection
*Solid Section, elset=ACTIVE_LAYER_ALL, material=ActiveLayerMaterial
,
*End Part
**
*Part, name=BottomRigidPlate
*End Part
**
*Part, name=TopRigidPlate
*End Part
**
**
** ASSEMBLY
**
*Assembly, name=Assembly
**
*Instance, name=ACTIVE_LAYER-1, part=ActiveLayer
          0.,           0.,         -0.5
*End Instance
**
*Instance, name=BOTTOM_PLATE-1, part=BottomRigidPlate
          0.,       -0.075,         -0.6
*Node
      1,           0.,           0.,  0.600000024
*Nset, nset=BOTTOM_PLATE-1-RefPt_, internal
1,
*Surface, type=CYLINDER, name=PLATE_SURFACE
START,         -0.6,           0.
 LINE,          0.6,           0.
*End Instance
**
*Instance, name=TOP_PLATE-1, part=TopRigidPlate
          0.,        0.075,         -0.6
*Node
      1,           0.,           0.,  0.600000024
*Nset, nset=TOP_PLATE-1-RefPt_, internal
1,
*Surface, type=CYLINDER, name=PLATE_SURFACE
START,          0.6,           0.
 LINE,         -0.6,           0.
*End Instance
**
*Nset, nset=BOTTOM_RP, instance=BOTTOM_PLATE-1
 1,
*Nset, nset=TOP_RP, instance=TOP_PLATE-1
 1,
*Nset, nset=_PickedSet10, internal, instance=TOP_PLATE-1
 1,
*Nset, nset=_PickedSet11, internal, instance=BOTTOM_PLATE-1
 1,
** Constraint: RigidBody-Bottom
*Rigid Body, ref node=_PickedSet11, analytical surface=BOTTOM_PLATE-1.PLATE_SURFACE
** Constraint: RigidBody-Top
*Rigid Body, ref node=_PickedSet10, analytical surface=TOP_PLATE-1.PLATE_SURFACE
*End Assembly
**
** MATERIALS
**
*Material, name=ActiveLayerMaterial
*Elastic
609., 0.1
*Plastic
 10.,   0.
 20.,  0.1
 35.,  0.2
 62.,  0.3
 92.,  0.4
145.,  0.5
230., 0.63
**
** INTERACTION PROPERTIES
**
*Surface Interaction, name=PlateActiveContact
1.,
*Friction
0.,
*Surface Behavior, pressure-overclosure=HARD
**
** BOUNDARY CONDITIONS
**
** Name: BC-BottomPlate-Fixed Type: �Գ�/���Գ�/��ȫ�̶�
*Boundary
BOTTOM_RP, ENCASTRE
** Name: BC-Drift-A Type: λ��/ת��
*Boundary
ACTIVE_LAYER-1.DRIFT_CORNER_A, 1, 1
ACTIVE_LAYER-1.DRIFT_CORNER_A, 3, 3
** Name: BC-Drift-B Type: λ��/ת��
*Boundary
ACTIVE_LAYER-1.DRIFT_CORNER_B, 3, 3
** Name: BC-TopPlate Type: λ��/ת��
*Boundary
TOP_RP, 1, 1
TOP_RP, 2, 2
TOP_RP, 3, 3
TOP_RP, 4, 4
TOP_RP, 5, 5
TOP_RP, 6, 6
**
** INTERACTIONS
**
** Interaction: Contact-Bottom
*Contact Pair, interaction=PlateActiveContact, type=SURFACE TO SURFACE
ACTIVE_LAYER-1.ACTIVE_BOTTOM, BOTTOM_PLATE-1.PLATE_SURFACE
** Interaction: Contact-Top
*Contact Pair, interaction=PlateActiveContact, type=SURFACE TO SURFACE
ACTIVE_LAYER-1.ACTIVE_TOP, TOP_PLATE-1.PLATE_SURFACE
** ----------------------------------------------------------------
**
** STEP: Step-1 Compression
**
*Step, name="Step-1 Compression", nlgeom=YES, inc=1000
*Static, stabilize=0.0002
0.02, 1., 1e-08, 0.05
**
** BOUNDARY CONDITIONS
**
** Name: BC-TopPlate Type: λ��/ת��
*Boundary
TOP_RP, 2, 2, -0.015
**
** OUTPUT REQUESTS
**
*Restart, write, frequency=0
**
** FIELD OUTPUT: F-ActiveLayer
**
*Output, field
*Node Output
U,
*Element Output, directions=YES
EVOL, LE, PE, PEEQ, S
**
** HISTORY OUTPUT: H-Energy
**
*Output, history
*Energy Output
ALLIE, ALLPD, ALLSD
**
** HISTORY OUTPUT: H-TopRP
**
*Node Output, nset=TOP_RP
RF2, U2
*End Step
** ----------------------------------------------------------------
**
** STEP: Step-2 Unload
**
*Step, name="Step-2 Unload", nlgeom=YES, inc=1000
*Static, stabilize=0.0002
0.02, 1., 1e-08, 0.05
**
** BOUNDARY CONDITIONS
**
** Name: BC-TopPlate Type: λ��/ת��
*Boundary
TOP_RP, 2, 2
**
** OUTPUT REQUESTS
**
*Restart, write, frequency=0
**
** FIELD OUTPUT: F-ActiveLayer
**
*Output, field
*Node Output
U,
*Element Output, directions=YES
EVOL, LE, PE, PEEQ, S
**
** HISTORY OUTPUT: H-Energy
**
*Output, history
*Energy Output
ALLIE, ALLPD, ALLSD
**
** HISTORY OUTPUT: H-TopRP
**
*Node Output, nset=TOP_RP
RF2, U2
*End Step
