*Heading
 Three-layer electrode compression and unloading validation
** Job name: Yang_Macro_LayeredElectrode_Compression Model name: Yang_Macro_LayeredElectrode_Compression
** Generated by: Abaqus/CAE 2025
*Preprint, echo=NO, model=NO, history=NO, contact=NO
**
** PARTS
**
*Part, name=BottomRigidPlate
*End Part
**
*Part, name=LayeredElectrode
*Node
      1,          0.5, 0.00749999983,           1.
      2,          0.5, 0.00749999983,           0.
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*Element, type=C3D8R
  1,  78, 253, 685, 217,   1,  17, 181,  38
  2, 253, 254, 686, 685,  17,  18, 182, 181
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*Nset, nset=LOWER_ACTIVE
    9,   10,   11,   12,   13,   14
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*Elset, elset=LOWER_ACTIVE, generate
 301,  600,    1
*Nset, nset=AL_COLLECTOR
    1,    2,    5,    8,    9,   10
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*Elset, elset=AL_COLLECTOR, generate
 601,  800,    1
*Nset, nset=UPPER_ACTIVE
   1,   2,   3,   4,   5,   6
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*Elset, elset=UPPER_ACTIVE, generate
   1,  300,    1
*Nset, nset=BOTTOM_SURFACE_NODES
  11,  12,  14,  15, 108, 109
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*Nset, nset=LOWER_ACTIVE_AL_INTERFACE_NODES
   9,  10,  13,  16,  97,  98
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*Nset, nset=AL_UPPER_ACTIVE_INTERFACE_NODES
   1,   2,   5,   8,  17,  18
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*Nset, nset=TOP_SURFACE_NODES
   3,   4,   6,   7,  28,  29
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*Nset, nset=DRIFT_CORNER_A
 15,
*Nset, nset=DRIFT_CORNER_B
 12,
*Elset, elset=_ELECTRODE_TOP_S5, internal
  21,  22,  23,  24,  25,  26
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*Surface, type=ELEMENT, name=ELECTRODE_TOP
_ELECTRODE_TOP_S5, S5
*Elset, elset=_ELECTRODE_BOTTOM_S5, internal
 321, 322, 323, 324, 325, 326
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*Surface, type=ELEMENT, name=ELECTRODE_BOTTOM
_ELECTRODE_BOTTOM_S5, S5
** Section: ActiveLayerSection
*Solid Section, elset=UPPER_ACTIVE, material=Active_Layer
,
** Section: ActiveLayerSection
*Solid Section, elset=LOWER_ACTIVE, material=Active_Layer
,
** Section: AlCollectorSection
*Solid Section, elset=AL_COLLECTOR, material=Al_Current_Collector
,
*End Part
**
*Part, name=TopRigidPlate
*End Part
**
**
** ASSEMBLY
**
*Assembly, name=Assembly
**
*Instance, name=LAYERED_ELECTRODE-1, part=LayeredElectrode
          0.,           0.,         -0.5
*End Instance
**
*Instance, name=BOTTOM_PLATE-1, part=BottomRigidPlate
          0.,      -0.0825,         -0.6
*Node
      1,           0.,           0.,  0.600000024
*Nset, nset=BOTTOM_PLATE-1-RefPt_, internal
1,
*Surface, type=CYLINDER, name=PLATE_SURFACE
START,         -0.6,           0.
 LINE,          0.6,           0.
*End Instance
**
*Instance, name=TOP_PLATE-1, part=TopRigidPlate
          0.,       0.0825,         -0.6
*Node
      1,           0.,           0.,  0.600000024
*Nset, nset=TOP_PLATE-1-RefPt_, internal
1,
*Surface, type=CYLINDER, name=PLATE_SURFACE
START,          0.6,           0.
 LINE,         -0.6,           0.
*End Instance
**
*Nset, nset=BOTTOM_RP, instance=BOTTOM_PLATE-1
 1,
*Nset, nset=TOP_RP, instance=TOP_PLATE-1
 1,
*Nset, nset=_PickedSet10, internal, instance=BOTTOM_PLATE-1
 1,
*Nset, nset=_PickedSet11, internal, instance=TOP_PLATE-1
 1,
** Constraint: RigidBody-Bottom
*Rigid Body, ref node=_PickedSet10, analytical surface=BOTTOM_PLATE-1.PLATE_SURFACE
** Constraint: RigidBody-Top
*Rigid Body, ref node=_PickedSet11, analytical surface=TOP_PLATE-1.PLATE_SURFACE
*End Assembly
**
** MATERIALS
**
*Material, name=Active_Layer
*Elastic
609., 0.1
*Plastic
 10.,   0.
 20.,  0.1
 35.,  0.2
 62.,  0.3
 92.,  0.4
145.,  0.5
230., 0.63
*Material, name=Al_Current_Collector
*Elastic
72000., 0.33
**
** INTERACTION PROPERTIES
**
*Surface Interaction, name=PlateElectrodeContact
1.,
*Friction
0.,
*Surface Behavior, pressure-overclosure=HARD
**
** BOUNDARY CONDITIONS
**
** Name: BC-BottomPlate-Fixed Type: 对称/反对称/完全固定
*Boundary
BOTTOM_RP, ENCASTRE
** Name: BC-Drift-A Type: 位移/转角
*Boundary
LAYERED_ELECTRODE-1.DRIFT_CORNER_A, 1, 1
LAYERED_ELECTRODE-1.DRIFT_CORNER_A, 3, 3
** Name: BC-Drift-B Type: 位移/转角
*Boundary
LAYERED_ELECTRODE-1.DRIFT_CORNER_B, 3, 3
** Name: BC-TopPlate Type: 位移/转角
*Boundary
TOP_RP, 1, 1
TOP_RP, 2, 2
TOP_RP, 3, 3
TOP_RP, 4, 4
TOP_RP, 5, 5
TOP_RP, 6, 6
**
** INTERACTIONS
**
** Interaction: Contact-Bottom
*Contact Pair, interaction=PlateElectrodeContact, type=SURFACE TO SURFACE
LAYERED_ELECTRODE-1.ELECTRODE_BOTTOM, BOTTOM_PLATE-1.PLATE_SURFACE
** Interaction: Contact-Top
*Contact Pair, interaction=PlateElectrodeContact, type=SURFACE TO SURFACE
LAYERED_ELECTRODE-1.ELECTRODE_TOP, TOP_PLATE-1.PLATE_SURFACE
** ----------------------------------------------------------------
**
** STEP: Step-1 Compression
**
*Step, name="Step-1 Compression", nlgeom=YES, inc=1000
*Static, stabilize=0.0002, allsdtol=0, continue=NO
0.02, 1., 1e-08, 0.05
**
** BOUNDARY CONDITIONS
**
** Name: BC-TopPlate Type: 位移/转角
*Boundary
TOP_RP, 2, 2, -0.015
**
** OUTPUT REQUESTS
**
*Restart, write, frequency=0
**
** FIELD OUTPUT: F-LayeredElectrode
**
*Output, field
*Node Output
U,
*Element Output, directions=YES
EVOL, LE, PE, PEEQ, S
**
** HISTORY OUTPUT: H-Energy
**
*Output, history
*Energy Output
ALLIE, ALLPD, ALLSD
**
** HISTORY OUTPUT: H-TopRP
**
*Node Output, nset=TOP_RP
RF2, U2
*End Step
** ----------------------------------------------------------------
**
** STEP: Step-2 Unload
**
*Step, name="Step-2 Unload", nlgeom=YES, inc=1000
*Static, stabilize=0.0002, allsdtol=0, continue=NO
0.02, 1., 1e-08, 0.05
**
** BOUNDARY CONDITIONS
**
** Name: BC-TopPlate Type: 位移/转角
*Boundary
TOP_RP, 2, 2
**
** OUTPUT REQUESTS
**
*Restart, write, frequency=0
**
** FIELD OUTPUT: F-LayeredElectrode
**
*Output, field
*Node Output
U,
*Element Output, directions=YES
EVOL, LE, PE, PEEQ, S
**
** HISTORY OUTPUT: H-Energy
**
*Output, history
*Energy Output
ALLIE, ALLPD, ALLSD
**
** HISTORY OUTPUT: H-TopRP
**
*Node Output, nset=TOP_RP
RF2, U2
*End Step
