*Heading
 Two-layer active-layer/current-collector compression validation
** Job name: Yang_Macro_TwoLayerElectrode_Compression Model name: Yang_Macro_TwoLayerElectrode_Compression
** Generated by: Abaqus/CAE 2025
*Preprint, echo=NO, model=NO, history=NO, contact=NO
**
** PARTS
**
*Part, name=ActiveLayer
*Node
      1,          0.5,  0.075000003,           1.
      2,          0.5, 0.0483999997,           1.
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*Element, type=C3D8R
  1,  67,  68,  74,  73,   1,   2,   8,   7
  2,  68,  69,  75,  74,   2,   3,   9,   8
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*Nset, nset=ACTIVE_LAYER_ALL, generate
   1,  726,    1
*Elset, elset=ACTIVE_LAYER_ALL, generate
   1,  500,    1
*Nset, nset=ACTIVE_TOP_NODES, generate
   1,  721,    6
*Nset, nset=ACTIVE_INTERFACE_NODES, generate
   6,  726,    6
*Elset, elset=_ACTIVE_TOP_S6, internal, generate
   1,  496,    5
*Surface, type=ELEMENT, name=ACTIVE_TOP
_ACTIVE_TOP_S6, S6
*Elset, elset=_ACTIVE_INTERFACE_S4, internal, generate
   5,  500,    5
*Surface, type=ELEMENT, name=ACTIVE_INTERFACE
_ACTIVE_INTERFACE_S4, S4
** Section: ActiveLayerSection
*Solid Section, elset=ACTIVE_LAYER_ALL, material=Active_Layer
,
*End Part
**
*Part, name=AlCollector
*Node
      1,          0.5, -0.0579999983,           1.
      2,          0.5, -0.0665000007,           1.
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*Element, type=C3D8R
  1,  34,  35,  38,  37,   1,   2,   5,   4
  2,  35,  36,  39,  38,   2,   3,   6,   5
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*Nset, nset=AL_COLLECTOR_ALL, generate
   1,  363,    1
*Elset, elset=AL_COLLECTOR_ALL, generate
   1,  200,    1
*Nset, nset=AL_INTERFACE_NODES, generate
   1,  361,    3
*Nset, nset=AL_BOTTOM_NODES, generate
   3,  363,    3
*Nset, nset=DRIFT_CORNER_A
 363,
*Nset, nset=DRIFT_CORNER_B
 33,
*Elset, elset=_AL_INTERFACE_S6, internal, generate
   1,  199,    2
*Surface, type=ELEMENT, name=AL_INTERFACE
_AL_INTERFACE_S6, S6
*Elset, elset=_AL_BOTTOM_S4, internal, generate
   2,  200,    2
*Surface, type=ELEMENT, name=AL_BOTTOM
_AL_BOTTOM_S4, S4
** Section: AlCollectorSection
*Solid Section, elset=AL_COLLECTOR_ALL, material=Al_Current_Collector
,
*End Part
**
*Part, name=BottomRigidPlate
*End Part
**
*Part, name=TopRigidPlate
*End Part
**
**
** ASSEMBLY
**
*Assembly, name=Assembly
**
*Instance, name=ACTIVE_LAYER-1, part=ActiveLayer
          0.,           0.,         -0.5
*End Instance
**
*Instance, name=AL_COLLECTOR-1, part=AlCollector
          0.,           0.,         -0.5
*End Instance
**
*Instance, name=BOTTOM_PLATE-1, part=BottomRigidPlate
          0.,       -0.075,         -0.6
*Node
      1,           0.,           0.,  0.600000024
*Nset, nset=BOTTOM_PLATE-1-RefPt_, internal
1,
*Surface, type=CYLINDER, name=PLATE_SURFACE
START,         -0.6,           0.
 LINE,          0.6,           0.
*End Instance
**
*Instance, name=TOP_PLATE-1, part=TopRigidPlate
          0.,        0.075,         -0.6
*Node
      1,           0.,           0.,  0.600000024
*Nset, nset=TOP_PLATE-1-RefPt_, internal
1,
*Surface, type=CYLINDER, name=PLATE_SURFACE
START,          0.6,           0.
 LINE,         -0.6,           0.
*End Instance
**
*Nset, nset=BOTTOM_RP, instance=BOTTOM_PLATE-1
 1,
*Nset, nset=TOP_RP, instance=TOP_PLATE-1
 1,
*Nset, nset=_PickedSet12, internal, instance=BOTTOM_PLATE-1
 1,
*Nset, nset=_PickedSet13, internal, instance=TOP_PLATE-1
 1,
** Constraint: RigidBody-Bottom
*Rigid Body, ref node=_PickedSet12, analytical surface=BOTTOM_PLATE-1.PLATE_SURFACE
** Constraint: RigidBody-Top
*Rigid Body, ref node=_PickedSet13, analytical surface=TOP_PLATE-1.PLATE_SURFACE
** Constraint: Tie-Active-Al
*Tie, name=Tie-Active-Al, adjust=no
ACTIVE_LAYER-1.ACTIVE_INTERFACE, AL_COLLECTOR-1.AL_INTERFACE
*End Assembly
**
** MATERIALS
**
*Material, name=Active_Layer
*Elastic
609., 0.1
*Plastic
 10.,   0.
 20.,  0.1
 35.,  0.2
 62.,  0.3
 92.,  0.4
145.,  0.5
230., 0.63
*Material, name=Al_Current_Collector
*Elastic
72000., 0.33
**
** INTERACTION PROPERTIES
**
*Surface Interaction, name=PlateElectrodeContact
1.,
*Friction
0.,
*Surface Behavior, pressure-overclosure=HARD
**
** BOUNDARY CONDITIONS
**
** Name: BC-BottomPlate-Fixed Type: 对称/反对称/完全固定
*Boundary
BOTTOM_RP, ENCASTRE
** Name: BC-Drift-A Type: 位移/转角
*Boundary
AL_COLLECTOR-1.DRIFT_CORNER_A, 1, 1
AL_COLLECTOR-1.DRIFT_CORNER_A, 3, 3
** Name: BC-Drift-B Type: 位移/转角
*Boundary
AL_COLLECTOR-1.DRIFT_CORNER_B, 3, 3
** Name: BC-TopPlate Type: 位移/转角
*Boundary
TOP_RP, 1, 1
TOP_RP, 2, 2
TOP_RP, 3, 3
TOP_RP, 4, 4
TOP_RP, 5, 5
TOP_RP, 6, 6
**
** INTERACTIONS
**
** Interaction: Contact-Bottom-Al
*Contact Pair, interaction=PlateElectrodeContact, type=SURFACE TO SURFACE
AL_COLLECTOR-1.AL_BOTTOM, BOTTOM_PLATE-1.PLATE_SURFACE
** Interaction: Contact-Top-Active
*Contact Pair, interaction=PlateElectrodeContact, type=SURFACE TO SURFACE
ACTIVE_LAYER-1.ACTIVE_TOP, TOP_PLATE-1.PLATE_SURFACE
** ----------------------------------------------------------------
**
** STEP: Step-1 Compression
**
*Step, name="Step-1 Compression", nlgeom=YES, inc=1000
*Static, stabilize=0.0002, allsdtol=0, continue=NO
0.02, 1., 1e-08, 0.05
**
** BOUNDARY CONDITIONS
**
** Name: BC-TopPlate Type: 位移/转角
*Boundary
TOP_RP, 2, 2, -0.015
**
** OUTPUT REQUESTS
**
*Restart, write, frequency=0
**
** FIELD OUTPUT: F-TwoLayerElectrode
**
*Output, field
*Node Output
U,
*Element Output, directions=YES
EVOL, LE, PE, PEEQ, S
**
** HISTORY OUTPUT: H-Energy
**
*Output, history
*Energy Output
ALLIE, ALLPD, ALLSD
**
** HISTORY OUTPUT: H-TopRP
**
*Node Output, nset=TOP_RP
RF2, U2
*End Step
** ----------------------------------------------------------------
**
** STEP: Step-2 Unload
**
*Step, name="Step-2 Unload", nlgeom=YES, inc=1000
*Static, stabilize=0.0002, allsdtol=0, continue=NO
0.02, 1., 1e-08, 0.05
**
** BOUNDARY CONDITIONS
**
** Name: BC-TopPlate Type: 位移/转角
*Boundary
TOP_RP, 2, 2
**
** OUTPUT REQUESTS
**
*Restart, write, frequency=0
**
** FIELD OUTPUT: F-TwoLayerElectrode
**
*Output, field
*Node Output
U,
*Element Output, directions=YES
EVOL, LE, PE, PEEQ, S
**
** HISTORY OUTPUT: H-Energy
**
*Output, history
*Energy Output
ALLIE, ALLPD, ALLSD
**
** HISTORY OUTPUT: H-TopRP
**
*Node Output, nset=TOP_RP
RF2, U2
*End Step
