*Heading
 2D quick plane-strain DPC roll pressing thickness check
** Job name: RollPress_2D_DPC_RollFit_E6500_S00008B5 Model name: RollPress_2D_DPC_RollFit_E6500_S00008B5
** Generated by: Abaqus/CAE 2025
*Preprint, echo=NO, model=NO, history=NO, contact=NO
**
** SECTION CONTROLS
*SECTION CONTROLS, NAME=FilmControls, HOURGLASS=ENHANCED, DISTORTION CONTROL=YES
** PARTS
**
*Part, name=ActiveLayer
*Node
      1,           2.,           0.
      2,           2.,  0.150000006
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*Element, type=CPE4R
  1,    1,   15,  564,  138
  2,   15,   16,  565,  564
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*Nset, nset=_PickedSet12, internal, generate
    1,  5025,     1
*Elset, elset=_PickedSet12, internal, generate
    1,  4800,     1
*Elset, elset=_Front_S3, internal, generate
 4777,  4800,     1
*Surface, type=ELEMENT, name=Front
_Front_S3, S3
*Elset, elset=_Back_S3, internal, generate
 4297,  4320,     1
*Surface, type=ELEMENT, name=Back
_Back_S3, S3
** Section: Sec_ActiveLayer
*Solid Section, elset=_PickedSet12, material=ActiveLayer_DPC, controls=FilmControls
,
*End Part
**
*Part, name=LowerRollerRigid
*End Part
**
*Part, name=UpperRollerRigid
*End Part
**
**
** ASSEMBLY
**
*Assembly, name=Assembly
**
*Instance, name=ActiveLayer-1, part=ActiveLayer
*End Instance
**
*Instance, name=UpperRoller-1, part=UpperRollerRigid
          0.,       50.155,           0.
*Node
      1,           0.,           0.,           0.
*Nset, nset=UpperRoller-1-RefPt_, internal
1,
*Surface, type=SEGMENTS, name=RollSurface
START,           4., -49.8397431775084
 LINE, 3.93333333333333, -49.8450487901144
 LINE, 3.86666666666667, -49.850264682235
 LINE,          3.8, -49.85539088203
 LINE, 3.73333333333333, -49.8604274171634
 LINE, 3.66666666666667, -49.8653743148044
 LINE,          3.6, -49.8702316016278
 LINE, 3.53333333333333, -49.8749993038151
 LINE, 3.46666666666667, -49.8796774470548
 LINE,          3.4, -49.8842660565433
 LINE, 3.33333333333333, -49.8887651569859
 LINE, 3.26666666666667, -49.8931747725968
 LINE,          3.2, -49.8974949271003
 LINE, 3.13333333333333, -49.9017256437312
 LINE, 3.06666666666667, -49.9058669452356
 LINE,           3., -49.9099188538711
 LINE, 2.93333333333333, -49.9138813914081
 LINE, 2.86666666666667, -49.9177545791297
 LINE,          2.8, -49.9215384378326
 LINE, 2.73333333333333, -49.9252329878278
 LINE, 2.66666666666667, -49.9288382489407
 LINE,          2.6, -49.9323542405122
 LINE, 2.53333333333333, -49.9357809813987
 LINE, 2.46666666666667, -49.9391184899729
 LINE,          2.4, -49.9423667841243
 LINE, 2.33333333333333, -49.9455258812594
 LINE, 2.26666666666667, -49.9485957983027
 LINE,          2.2, -49.9515765516965
 LINE, 2.13333333333333, -49.954468157402
 LINE, 2.06666666666667, -49.9572706308991
 LINE,           2., -49.9599839871872
 LINE, 1.93333333333333, -49.9626082407856
 LINE, 1.86666666666667, -49.9651434057339
 LINE,          1.8, -49.967589495592
 LINE, 1.73333333333333, -49.969946523441
 LINE, 1.66666666666667, -49.9722145018832
 LINE,          1.6, -49.9743934430424
 LINE, 1.53333333333333, -49.9764833585646
 LINE, 1.46666666666667, -49.978484259618
 LINE,          1.4, -49.9803961568934
 LINE, 1.33333333333333, -49.9822190606042
 LINE, 1.26666666666667, -49.9839529804872
 LINE,          1.2, -49.9855979258026
 LINE, 1.13333333333333, -49.9871539053341
 LINE, 1.06666666666667, -49.9886209273893
 LINE,           1., -49.9899989998
 LINE, 0.933333333333334, -49.9912881299221
 LINE, 0.866666666666666, -49.9924883246362
 LINE,          0.8, -49.9935995903476
 LINE, 0.733333333333333, -49.9946219329862
 LINE, 0.666666666666667, -49.9955553580071
 LINE,          0.6, -49.9963998703907
 LINE, 0.533333333333333, -49.9971554746423
 LINE, 0.466666666666667, -49.997822174793
 LINE,          0.4, -49.9983999743992
 LINE, 0.333333333333333, -49.9988888765429
 LINE, 0.266666666666667, -49.999288883832
 LINE,          0.2, -49.9995999984
 LINE, 0.133333333333334, -49.9998222219062
 LINE, 0.0666666666666664, -49.9999555555358
 LINE,           0.,         -50.
 LINE, -0.0666666666666669, -49.9999555555358
 LINE, -0.133333333333333, -49.9998222219062
 LINE,         -0.2, -49.9995999984
 LINE, -0.266666666666667, -49.999288883832
 LINE, -0.333333333333333, -49.9988888765429
 LINE,         -0.4, -49.9983999743992
 LINE, -0.466666666666667, -49.997822174793
 LINE, -0.533333333333333, -49.9971554746423
 LINE,         -0.6, -49.9963998703907
 LINE, -0.666666666666667, -49.9955553580071
 LINE, -0.733333333333333, -49.9946219329862
 LINE,         -0.8, -49.9935995903476
 LINE, -0.866666666666667, -49.9924883246362
 LINE, -0.933333333333333, -49.9912881299221
 LINE,          -1., -49.9899989998
 LINE, -1.06666666666667, -49.9886209273893
 LINE, -1.13333333333333, -49.9871539053341
 LINE,         -1.2, -49.9855979258026
 LINE, -1.26666666666667, -49.9839529804872
 LINE, -1.33333333333333, -49.9822190606042
 LINE,         -1.4, -49.9803961568934
 LINE, -1.46666666666667, -49.978484259618
 LINE, -1.53333333333333, -49.9764833585646
 LINE,         -1.6, -49.9743934430424
 LINE, -1.66666666666667, -49.9722145018832
 LINE, -1.73333333333333, -49.969946523441
 LINE,         -1.8, -49.967589495592
 LINE, -1.86666666666667, -49.9651434057339
 LINE, -1.93333333333333, -49.9626082407856
 LINE,          -2., -49.9599839871872
 LINE, -2.06666666666667, -49.9572706308991
 LINE, -2.13333333333333, -49.954468157402
 LINE,         -2.2, -49.9515765516965
 LINE, -2.26666666666667, -49.9485957983027
 LINE, -2.33333333333333, -49.9455258812594
 LINE,         -2.4, -49.9423667841243
 LINE, -2.46666666666667, -49.9391184899729
 LINE, -2.53333333333333, -49.9357809813987
 LINE,         -2.6, -49.9323542405122
 LINE, -2.66666666666667, -49.9288382489407
 LINE, -2.73333333333333, -49.9252329878278
 LINE,         -2.8, -49.9215384378326
 LINE, -2.86666666666667, -49.9177545791297
 LINE, -2.93333333333333, -49.9138813914081
 LINE,          -3., -49.9099188538711
 LINE, -3.06666666666667, -49.9058669452356
 LINE, -3.13333333333333, -49.9017256437312
 LINE,         -3.2, -49.8974949271003
 LINE, -3.26666666666667, -49.8931747725968
 LINE, -3.33333333333333, -49.8887651569859
 LINE,         -3.4, -49.8842660565433
 LINE, -3.46666666666667, -49.8796774470548
 LINE, -3.53333333333333, -49.8749993038151
 LINE,         -3.6, -49.8702316016278
 LINE, -3.66666666666667, -49.8653743148044
 LINE, -3.73333333333333, -49.8604274171634
 LINE,         -3.8, -49.85539088203
 LINE, -3.86666666666667, -49.850264682235
 LINE, -3.93333333333333, -49.8450487901144
 LINE,          -4., -49.8397431775084
*Rigid Body, ref node=UpperRoller-1-RefPt_, analytical surface=RollSurface
*End Instance
**
*Instance, name=LowerRoller-1, part=LowerRollerRigid
          0.,      -50.005,           0.
*Node
      1,           0.,           0.,           0.
*Nset, nset=LowerRoller-1-RefPt_, internal
1,
*Surface, type=SEGMENTS, name=RollSurface
START,          -4., 49.8397431775084
 LINE, -3.93333333333333, 49.8450487901144
 LINE, -3.86666666666667, 49.850264682235
 LINE,         -3.8, 49.85539088203
 LINE, -3.73333333333333, 49.8604274171634
 LINE, -3.66666666666667, 49.8653743148044
 LINE,         -3.6, 49.8702316016278
 LINE, -3.53333333333333, 49.8749993038151
 LINE, -3.46666666666667, 49.8796774470548
 LINE,         -3.4, 49.8842660565433
 LINE, -3.33333333333333, 49.8887651569859
 LINE, -3.26666666666667, 49.8931747725968
 LINE,         -3.2, 49.8974949271003
 LINE, -3.13333333333333, 49.9017256437312
 LINE, -3.06666666666667, 49.9058669452356
 LINE,          -3., 49.9099188538711
 LINE, -2.93333333333333, 49.9138813914081
 LINE, -2.86666666666667, 49.9177545791297
 LINE,         -2.8, 49.9215384378326
 LINE, -2.73333333333333, 49.9252329878278
 LINE, -2.66666666666667, 49.9288382489407
 LINE,         -2.6, 49.9323542405122
 LINE, -2.53333333333333, 49.9357809813987
 LINE, -2.46666666666667, 49.9391184899729
 LINE,         -2.4, 49.9423667841243
 LINE, -2.33333333333333, 49.9455258812594
 LINE, -2.26666666666667, 49.9485957983027
 LINE,         -2.2, 49.9515765516965
 LINE, -2.13333333333333, 49.954468157402
 LINE, -2.06666666666667, 49.9572706308991
 LINE,          -2., 49.9599839871872
 LINE, -1.93333333333333, 49.9626082407856
 LINE, -1.86666666666667, 49.9651434057339
 LINE,         -1.8, 49.967589495592
 LINE, -1.73333333333333, 49.969946523441
 LINE, -1.66666666666667, 49.9722145018832
 LINE,         -1.6, 49.9743934430424
 LINE, -1.53333333333333, 49.9764833585646
 LINE, -1.46666666666667, 49.978484259618
 LINE,         -1.4, 49.9803961568934
 LINE, -1.33333333333333, 49.9822190606042
 LINE, -1.26666666666667, 49.9839529804872
 LINE,         -1.2, 49.9855979258026
 LINE, -1.13333333333333, 49.9871539053341
 LINE, -1.06666666666667, 49.9886209273893
 LINE,          -1., 49.9899989998
 LINE, -0.933333333333333, 49.9912881299221
 LINE, -0.866666666666667, 49.9924883246362
 LINE,         -0.8, 49.9935995903476
 LINE, -0.733333333333333, 49.9946219329862
 LINE, -0.666666666666667, 49.9955553580071
 LINE,         -0.6, 49.9963998703907
 LINE, -0.533333333333333, 49.9971554746423
 LINE, -0.466666666666667, 49.997822174793
 LINE,         -0.4, 49.9983999743992
 LINE, -0.333333333333333, 49.9988888765429
 LINE, -0.266666666666667, 49.999288883832
 LINE,         -0.2, 49.9995999984
 LINE, -0.133333333333333, 49.9998222219062
 LINE, -0.0666666666666669, 49.9999555555358
 LINE,           0.,          50.
 LINE, 0.0666666666666664, 49.9999555555358
 LINE, 0.133333333333334, 49.9998222219062
 LINE,          0.2, 49.9995999984
 LINE, 0.266666666666667, 49.999288883832
 LINE, 0.333333333333333, 49.9988888765429
 LINE,          0.4, 49.9983999743992
 LINE, 0.466666666666667, 49.997822174793
 LINE, 0.533333333333333, 49.9971554746423
 LINE,          0.6, 49.9963998703907
 LINE, 0.666666666666667, 49.9955553580071
 LINE, 0.733333333333333, 49.9946219329862
 LINE,          0.8, 49.9935995903476
 LINE, 0.866666666666666, 49.9924883246362
 LINE, 0.933333333333334, 49.9912881299221
 LINE,           1., 49.9899989998
 LINE, 1.06666666666667, 49.9886209273893
 LINE, 1.13333333333333, 49.9871539053341
 LINE,          1.2, 49.9855979258026
 LINE, 1.26666666666667, 49.9839529804872
 LINE, 1.33333333333333, 49.9822190606042
 LINE,          1.4, 49.9803961568934
 LINE, 1.46666666666667, 49.978484259618
 LINE, 1.53333333333333, 49.9764833585646
 LINE,          1.6, 49.9743934430424
 LINE, 1.66666666666667, 49.9722145018832
 LINE, 1.73333333333333, 49.969946523441
 LINE,          1.8, 49.967589495592
 LINE, 1.86666666666667, 49.9651434057339
 LINE, 1.93333333333333, 49.9626082407856
 LINE,           2., 49.9599839871872
 LINE, 2.06666666666667, 49.9572706308991
 LINE, 2.13333333333333, 49.954468157402
 LINE,          2.2, 49.9515765516965
 LINE, 2.26666666666667, 49.9485957983027
 LINE, 2.33333333333333, 49.9455258812594
 LINE,          2.4, 49.9423667841243
 LINE, 2.46666666666667, 49.9391184899729
 LINE, 2.53333333333333, 49.9357809813987
 LINE,          2.6, 49.9323542405122
 LINE, 2.66666666666667, 49.9288382489407
 LINE, 2.73333333333333, 49.9252329878278
 LINE,          2.8, 49.9215384378326
 LINE, 2.86666666666667, 49.9177545791297
 LINE, 2.93333333333333, 49.9138813914081
 LINE,           3., 49.9099188538711
 LINE, 3.06666666666667, 49.9058669452356
 LINE, 3.13333333333333, 49.9017256437312
 LINE,          3.2, 49.8974949271003
 LINE, 3.26666666666667, 49.8931747725968
 LINE, 3.33333333333333, 49.8887651569859
 LINE,          3.4, 49.8842660565433
 LINE, 3.46666666666667, 49.8796774470548
 LINE, 3.53333333333333, 49.8749993038151
 LINE,          3.6, 49.8702316016278
 LINE, 3.66666666666667, 49.8653743148044
 LINE, 3.73333333333333, 49.8604274171634
 LINE,          3.8, 49.85539088203
 LINE, 3.86666666666667, 49.850264682235
 LINE, 3.93333333333333, 49.8450487901144
 LINE,           4., 49.8397431775084
*Rigid Body, ref node=LowerRoller-1-RefPt_, analytical surface=RollSurface
*End Instance
**
*Nset, nset=Bottom_Nodes, instance=ActiveLayer-1
   1,   4,   6,   8,  10,  12
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*Nset, nset=RP_LowerRoller, instance=LowerRoller-1
 1,
*Nset, nset=RP_UpperRoller, instance=UpperRoller-1
 1,
*Nset, nset=Sheet_All, instance=ActiveLayer-1, generate
    1,  5025,     1
*Elset, elset=Sheet_All, instance=ActiveLayer-1, generate
    1,  4800,     1
*Nset, nset=Sheet_Back_Nodes, instance=ActiveLayer-1
  11,  12, 461, 462, 463, 464
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*Nset, nset=Sheet_Front_Nodes, instance=ActiveLayer-1
  13,  14, 522, 523, 524, 525
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*Nset, nset=Top_Nodes, instance=ActiveLayer-1
   2,   3,   5,   7,   9,  11
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*Elset, elset=_Sheet_Back_S3, internal, instance=ActiveLayer-1, generate
 4297,  4320,     1
*Surface, type=ELEMENT, name=Sheet_Back
_Sheet_Back_S3, S3
*Elset, elset=_Sheet_Bottom_S4, internal, instance=ActiveLayer-1, generate
    1,  4297,    24
*Elset, elset=_Sheet_Bottom_S2, internal, instance=ActiveLayer-1, generate
 4344,  4800,    24
*Surface, type=ELEMENT, name=Sheet_Bottom
_Sheet_Bottom_S4, S4
_Sheet_Bottom_S2, S2
*Elset, elset=_Sheet_Front_S3, internal, instance=ActiveLayer-1, generate
 4777,  4800,     1
*Surface, type=ELEMENT, name=Sheet_Front
_Sheet_Front_S3, S3
*Elset, elset=_Sheet_Top_S2, internal, instance=ActiveLayer-1, generate
   24,  4320,    24
*Elset, elset=_Sheet_Top_S4, internal, instance=ActiveLayer-1, generate
 4321,  4777,    24
*Surface, type=ELEMENT, name=Sheet_Top
_Sheet_Top_S2, S2
_Sheet_Top_S4, S4
*End Assembly
*Amplitude, name=Amp_Clamp_Drop, time=TOTAL TIME, definition=SMOOTH STEP
             0.,              0.,             0.2,              1.,            0.64,              1.
*Amplitude, name=Amp_Rolling_Spin, definition=SMOOTH STEP
             0.,              0.,            0.05,              1.,            0.42,              1.
*Amplitude, name=Amp_Spin_Total, time=TOTAL TIME, definition=SMOOTH STEP
             0.,              0.,            0.05,              1.,            0.64,              1.
**
** MATERIALS
**
*Material, name=ActiveLayer_DPC
*Cap Plasticity
 0.0032,    5.,   0.8, 0.048,  0.02,    1.
*Cap Hardening
  0.048,   0.
 0.0496, 0.05
 0.0528,  0.1
 0.0576, 0.15
  0.064, 0.18
  0.072,  0.2
  0.088, 0.22
  0.112, 0.24
  0.152, 0.26
  0.216, 0.28
  0.312,  0.3
  0.384, 0.31
   0.48, 0.32
  0.592, 0.33
*Density
 2.55e-09,
*Elastic
6500., 0.01
**
** INTERACTION PROPERTIES
**
*Surface Interaction, name=Roller_Film_mu0p1
*Friction
 0.1,
*Surface Behavior, pressure-overclosure=HARD
**
** BOUNDARY CONDITIONS
**
** Name: BC_Back_Guide_Y Type: 位移/转角
*Boundary
Sheet_Back_Nodes, 2, 2
** Name: BC_Front_Guide_Y Type: 位移/转角
*Boundary
Sheet_Front_Nodes, 2, 2
** Name: BC_Lower_RP_Support Type: 位移/转角
*Boundary
RP_LowerRoller, 1, 1
RP_LowerRoller, 2, 2
** Name: BC_Upper_RP_LateralSupport Type: 位移/转角
*Boundary
RP_UpperRoller, 1, 1
** ----------------------------------------------------------------
**
** STEP: Clamp_Down
**
*Step, name=Clamp_Down, nlgeom=YES
*Dynamic, Explicit
, 0.2
*DIAGNOSTICS, CUTOFF RATIO=1000.
*Bulk Viscosity
0.12, 1.2
** Mass Scaling: Semi-Automatic
**               Whole Model
*Fixed Mass Scaling, dt=1e-06, type=below min
**
** BOUNDARY CONDITIONS
**
** Name: BC_Lower_Rotation Type: 速度/角速度
*Boundary, amplitude=Amp_Spin_Total, type=VELOCITY
RP_LowerRoller, 6, 6, -0.166667
** Name: BC_Sheet_Feed_X Type: 速度/角速度
*Boundary, amplitude=Amp_Spin_Total, type=VELOCITY
Sheet_All, 1, 1, 13.3333
** Name: BC_Upper_RP_Drop Type: 位移/转角
*Boundary, amplitude=Amp_Clamp_Drop
RP_UpperRoller, 2, 2, -0.025
** Name: BC_Upper_Rotation Type: 速度/角速度
*Boundary, amplitude=Amp_Spin_Total, type=VELOCITY
RP_UpperRoller, 6, 6, 0.266667
**
** INTERACTIONS
**
** Interaction: BottomRoller_to_Film
*Contact Pair, op=ADD, interaction=Roller_Film_mu0p1, mechanical constraint=KINEMATIC, cpset=BottomRoller_to_Film
LowerRoller-1.RollSurface, Sheet_Bottom
** Interaction: TopRoller_to_Film
*Contact Pair, op=ADD, interaction=Roller_Film_mu0p1, mechanical constraint=KINEMATIC, cpset=TopRoller_to_Film
UpperRoller-1.RollSurface, Sheet_Top
**
** OUTPUT REQUESTS
**
*Restart, write, number interval=1, time marks=NO
**
** FIELD OUTPUT: F_Sheet
**
*Output, field, number interval=120
*Node Output, nset=Sheet_All
A, U, V
*Element Output, elset=Sheet_All, directions=YES
LE, PE, PEEQ, S
*Contact Output, variable=PRESELECT
**
** HISTORY OUTPUT: H-Output-1
**
*Output, history, variable=PRESELECT
**
** HISTORY OUTPUT: H_Energy
**
*Output, history, time interval=0.0004
*Energy Output
ALLAE, ALLIE, ALLKE, ALLMW, ALLPD, ALLSE, ALLWK
**
** HISTORY OUTPUT: H_LowerRoller_RP
**
*Node Output, nset=RP_LowerRoller
RF1, RF2, RM3, U2, UR3, VR3
**
** HISTORY OUTPUT: H_UpperRoller_RP
**
*Node Output, nset=RP_UpperRoller
RF1, RF2, RM3, U2, UR3, VR3
*End Step
** ----------------------------------------------------------------
**
** STEP: Hold_Clamp
**
*Step, name=Hold_Clamp, nlgeom=YES
*Dynamic, Explicit
, 0.02
*DIAGNOSTICS, CUTOFF RATIO=1000.
*Bulk Viscosity
0.12, 1.2
**
** OUTPUT REQUESTS
**
*Restart, write, number interval=1, time marks=NO
**
** FIELD OUTPUT: F_Sheet
**
*Output, field, number interval=120
*Node Output, nset=Sheet_All
A, U, V
*Element Output, elset=Sheet_All, directions=YES
LE, PE, PEEQ, S
*Contact Output, variable=PRESELECT
**
** HISTORY OUTPUT: H-Output-1
**
*Output, history, variable=PRESELECT
**
** HISTORY OUTPUT: H_Energy
**
*Output, history, time interval=4e-05
*Energy Output
ALLAE, ALLIE, ALLKE, ALLMW, ALLPD, ALLSE, ALLWK
**
** HISTORY OUTPUT: H_LowerRoller_RP
**
*Node Output, nset=RP_LowerRoller
RF1, RF2, RM3, U2, UR3, VR3
**
** HISTORY OUTPUT: H_UpperRoller_RP
**
*Node Output, nset=RP_UpperRoller
RF1, RF2, RM3, U2, UR3, VR3
*End Step
** ----------------------------------------------------------------
**
** STEP: Rolling
**
*Step, name=Rolling, nlgeom=YES
*Dynamic, Explicit
, 0.42
*DIAGNOSTICS, CUTOFF RATIO=1000.
*Bulk Viscosity
0.12, 1.2
**
** OUTPUT REQUESTS
**
*Restart, write, number interval=1, time marks=NO
**
** FIELD OUTPUT: F_Sheet
**
*Output, field, number interval=120
*Node Output, nset=Sheet_All
A, U, V
*Element Output, elset=Sheet_All, directions=YES
LE, PE, PEEQ, S
*Contact Output, variable=PRESELECT
**
** HISTORY OUTPUT: H-Output-1
**
*Output, history, variable=PRESELECT
**
** HISTORY OUTPUT: H_Energy
**
*Output, history, time interval=0.00084
*Energy Output
ALLAE, ALLIE, ALLKE, ALLMW, ALLPD, ALLSE, ALLWK
**
** HISTORY OUTPUT: H_LowerRoller_RP
**
*Node Output, nset=RP_LowerRoller
RF1, RF2, RM3, U2, UR3, VR3
**
** HISTORY OUTPUT: H_UpperRoller_RP
**
*Node Output, nset=RP_UpperRoller
RF1, RF2, RM3, U2, UR3, VR3
*End Step
