*Heading
 3D explicit staged clamp-then-roll model for a self-supporting coating film
** Job name: RP3D_Self_DPC_S030_50mm_Roll10mm_dt5e6_CoarseRoller_V2p2 Model name: RP3D_Self_DPC_S030_50mm_Roll10mm_dt5e6_CoarseRoller_V2p2
** Generated by: Abaqus/CAE 2025
*Preprint, echo=NO, model=NO, history=NO, contact=NO
**
** PARTS
**
*Part, name=ActiveLayer
*Node
      1,          -1.,  0.150000006,         100.
      2,          -1.,  0.150000006,           0.
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*Element, type=C3D8R
  1,  124,  645, 2757,  613,    1,   25,  461,   70
  2,  645,  646, 2758, 2757,   25,   26,  462,  461
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*Nset, nset=_PickedSet10, internal, generate
    1,  5796,     1
*Elset, elset=_PickedSet10, internal, generate
    1,  4500,     1
*Elset, elset=_Top_S2, internal
   1,   2,   3,   4,   5,   6
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*Elset, elset=_Top_S6, internal, generate
 4401,  4496,     5
*Elset, elset=_Top_S1, internal
 3081, 3082, 3083, 3084, 3085, 3086
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*Surface, type=ELEMENT, name=Top
_Top_S2, S2
_Top_S6, S6
_Top_S1, S1
*Elset, elset=_Bottom_S4, internal, generate
 4405,  4500,     5
*Elset, elset=_Bottom_S1, internal
  401,  402,  403,  404,  405,  406
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*Elset, elset=_Bottom_S2, internal
 1801, 1802, 1803, 1804, 1805, 1806
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*Surface, type=ELEMENT, name=Bottom
_Bottom_S4, S4
_Bottom_S1, S1
_Bottom_S2, S2
*Elset, elset=_Front_S2, internal, generate
 4401,  4500,     1
*Surface, type=ELEMENT, name=Front
_Front_S2, S2
*Elset, elset=_Back_S5, internal
 3581, 3582, 3583, 3584, 3585, 3586
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*Surface, type=ELEMENT, name=Back
_Back_S5, S5
** Section: Sec_ActiveLayer
*Solid Section, elset=_PickedSet10, material=ActiveLayer_Porous_Calibratable
,
*End Part
**
*Part, name=ElasticRoller_WithShoulders
*Node
      1,          50.,           0.,         130.
      2,          50.,           0.,         140.
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*Element, type=C3D4
  1, 198, 774, 191, 239
  2, 774, 257, 267, 273
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*Nset, nset=_PickedSet6, internal, generate
    1,  1624,     1
*Elset, elset=_PickedSet6, internal, generate
    1,  7804,     1
*Elset, elset=_ContactFace_S3, internal
  800,  821,  863,  865,  877,  883
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*Elset, elset=_ContactFace_S1, internal
 1725, 2243, 2434, 2622, 2724, 2756
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*Elset, elset=_ContactFace_S4, internal
 2118, 2575, 2644, 2671, 2711, 3196
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*Elset, elset=_ContactFace_S2, internal
 2365, 2506, 2527, 2599, 2635, 2668
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*Surface, type=ELEMENT, name=ContactFace
_ContactFace_S3, S3
_ContactFace_S1, S1
_ContactFace_S4, S4
_ContactFace_S2, S2
*Elset, elset=_EndFaces_S3, internal
    2,    6,   19,   23,   39,   47
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*Elset, elset=_EndFaces_S2, internal
    9,  121,  203,  208,  218,  224
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*Elset, elset=_EndFaces_S1, internal
   28,  199,  240,  248,  257,  262
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*Elset, elset=_EndFaces_S4, internal
   34,   37,   57,   74,  232,  236
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*Surface, type=ELEMENT, name=EndFaces
_EndFaces_S3, S3
_EndFaces_S2, S2
_EndFaces_S4, S4
_EndFaces_S1, S1
** Section: Sec_Roller_ZincSteel
*Solid Section, elset=_PickedSet6, material=Roller_E193GPa
,
*End Part
**
**
** ASSEMBLY
**
*Assembly, name=Assembly
**
*Instance, name=ActiveLayer-1, part=ActiveLayer
          0.,           0.,         -50.
*End Instance
**
*Instance, name=LowerRoller-1, part=ElasticRoller_WithShoulders
          0.,         -50.,         -70.
*End Instance
**
*Instance, name=UpperRoller-1, part=ElasticRoller_WithShoulders
          0.,        50.15,         -70.
*End Instance
**
*Node
      1,           0.,   50.1500015,           0.
*Node
      2,           0.,         -50.,           0.
*Elset, elset=MassScale_Active_Critical, instance=ActiveLayer-1, generate
    1,  4500,     1
*Nset, nset=RP_LowerRoller
 2,
*Nset, nset=RP_UpperRoller
 1,
*Nset, nset=Sheet_Active, instance=ActiveLayer-1, generate
    1,  5796,     1
*Elset, elset=Sheet_Active, instance=ActiveLayer-1, generate
    1,  4500,     1
*Nset, nset=Sheet_All, instance=ActiveLayer-1, generate
    1,  5796,     1
*Elset, elset=Sheet_All, instance=ActiveLayer-1, generate
    1,  4500,     1
*Elset, elset=_Sheet_BackFace_S5, internal, instance=ActiveLayer-1
 3581, 3582, 3583, 3584, 3585, 3586
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*Surface, type=ELEMENT, name=Sheet_BackFace
_Sheet_BackFace_S5, S5
*Elset, elset=_Sheet_FrontFace_S2, internal, instance=ActiveLayer-1, generate
 4401,  4500,     1
*Surface, type=ELEMENT, name=Sheet_FrontFace
_Sheet_FrontFace_S2, S2
** Constraint: Couple_Lower_EndFaces_to_RP
*Coupling, constraint name=Couple_Lower_EndFaces_to_RP, ref node=RP_LowerRoller, surface=LowerRoller-1.EndFaces
*Kinematic
** Constraint: Couple_Upper_EndFaces_to_RP
*Coupling, constraint name=Couple_Upper_EndFaces_to_RP, ref node=RP_UpperRoller, surface=UpperRoller-1.EndFaces
*Kinematic
*End Assembly
*Amplitude, name=Amp_Clamp_Drop, time=TOTAL TIME, definition=SMOOTH STEP
             0.,              0.,            0.05,              1.,            0.85,              1.
*Amplitude, name=Amp_Rolling_Spin, definition=SMOOTH STEP
             0.,              0.,            0.05,              1.,            0.75,              1.
**
** MATERIALS
**
*Material, name=ActiveLayer_Porous_Calibratable
*Cap Plasticity
4.,  65.,  0.8,  18., 0.02,   1.
*Cap Hardening
  18.,   0.
 18.6, 0.05
 19.8,  0.1
 21.6, 0.15
  24., 0.18
  27.,  0.2
  33., 0.22
  42., 0.24
  57., 0.26
  81., 0.28
 117.,  0.3
 144., 0.31
 180., 0.32
 222., 0.33
*Density
 2.55e-09,
*Elastic
6500., 0.01
*Material, name=Roller_E193GPa
*Density
 7.93e-09,
*Elastic
193000., 0.2
**
** INTERACTION PROPERTIES
**
*Surface Interaction, name=Contact_BottomRoller_Active_mu0p1
*Friction
 0.1,
*Surface Behavior, pressure-overclosure=HARD
*Surface Interaction, name=Contact_TopRoller_Active_mu0p1
*Friction
 0.1,
*Surface Behavior, pressure-overclosure=HARD
**
** BOUNDARY CONDITIONS
**
** Name: BC_Lower_RP_Support Type: 位移/转角
*Boundary
RP_LowerRoller, 1, 1
RP_LowerRoller, 2, 2
RP_LowerRoller, 3, 3
RP_LowerRoller, 4, 4
RP_LowerRoller, 5, 5
** Name: BC_Upper_RP_LateralSupport Type: 位移/转角
*Boundary
RP_UpperRoller, 1, 1
RP_UpperRoller, 3, 3
RP_UpperRoller, 4, 4
RP_UpperRoller, 5, 5
** ----------------------------------------------------------------
**
** STEP: Clamp_Down
**
*Step, name=Clamp_Down, nlgeom=YES
*Dynamic, Explicit
, 0.05
*Bulk Viscosity
0.12, 1.2
** Mass Scaling: Semi-Automatic
**               Whole Model
*Fixed Mass Scaling, dt=5e-06, type=below min
**
** BOUNDARY CONDITIONS
**
** Name: BC_Lower_NoSpin_ClampHold Type: 位移/转角
*Boundary
RP_LowerRoller, 6, 6
** Name: BC_Upper_NoSpin_ClampHold Type: 位移/转角
*Boundary
RP_UpperRoller, 6, 6
** Name: BC_Upper_RP_Drop Type: 位移/转角
*Boundary, amplitude=Amp_Clamp_Drop
RP_UpperRoller, 2, 2, -0.015
**
** LOADS
**
** Name: Load_Back_Tension   Type: Surface traction
*Dsload, follower=NO
Sheet_BackFace, TRVEC, 0.01, -1., 0., 0.
** Name: Load_Front_Tension   Type: Surface traction
*Dsload, follower=NO
Sheet_FrontFace, TRVEC, 0.01, 1., 0., 0.
**
** INTERACTIONS
**
** Interaction: BottomRoller_to_ActiveFilm
*Contact Pair, op=ADD, interaction=Contact_BottomRoller_Active_mu0p1, mechanical constraint=PENALTY, cpset=BottomRoller_to_ActiveFilm
LowerRoller-1.ContactFace, ActiveLayer-1.Bottom
** Interaction: TopRoller_to_ActiveFilm
*Contact Pair, op=ADD, interaction=Contact_TopRoller_Active_mu0p1, mechanical constraint=PENALTY, cpset=TopRoller_to_ActiveFilm
UpperRoller-1.ContactFace, ActiveLayer-1.Top
**
** OUTPUT REQUESTS
**
*Restart, write, number interval=1, time marks=NO
**
** FIELD OUTPUT: F_Sheet_StressStrain
**
*Output, field, number interval=80
*Node Output, nset=Sheet_All, variable=PRESELECT
*Element Output, elset=Sheet_All, directions=YES
LE, PE, PEEQ, PRESS, S
*Contact Output, variable=PRESELECT
**
** HISTORY OUTPUT: H-Output-1
**
*Output, history, variable=PRESELECT
**
** HISTORY OUTPUT: H_Energy
**
*Output, history, time interval=0.0002
*Energy Output
ALLAE, ALLIE, ALLKE, ALLMW, ALLPD, ALLSE, ALLWK
**
** HISTORY OUTPUT: H_LowerRoller_RP
**
*Node Output, nset=RP_LowerRoller
RF1, RF2, RF3, RM3, U2, UR3, VR3
**
** HISTORY OUTPUT: H_UpperRoller_RP
**
*Node Output, nset=RP_UpperRoller
RF1, RF2, RF3, RM3, U2, UR3, VR3
*End Step
** ----------------------------------------------------------------
**
** STEP: Hold_Clamp
**
*Step, name=Hold_Clamp, nlgeom=YES
*Dynamic, Explicit
, 0.05
*Bulk Viscosity
0.12, 1.2
** Mass Scaling: Semi-Automatic
**               Whole Model
*Fixed Mass Scaling, dt=5e-06, type=below min
**
** OUTPUT REQUESTS
**
*Restart, write, number interval=1, time marks=NO
**
** FIELD OUTPUT: F_Sheet_StressStrain
**
*Output, field, number interval=80
*Node Output, nset=Sheet_All, variable=PRESELECT
*Element Output, elset=Sheet_All, directions=YES
LE, PE, PEEQ, PRESS, S
*Contact Output, variable=PRESELECT
**
** HISTORY OUTPUT: H-Output-1
**
*Output, history, variable=PRESELECT
**
** HISTORY OUTPUT: H_Energy
**
*Output, history, time interval=0.0002
*Energy Output
ALLAE, ALLIE, ALLKE, ALLMW, ALLPD, ALLSE, ALLWK
**
** HISTORY OUTPUT: H_LowerRoller_RP
**
*Node Output, nset=RP_LowerRoller
RF1, RF2, RF3, RM3, U2, UR3, VR3
**
** HISTORY OUTPUT: H_UpperRoller_RP
**
*Node Output, nset=RP_UpperRoller
RF1, RF2, RF3, RM3, U2, UR3, VR3
*End Step
** ----------------------------------------------------------------
**
** STEP: Rolling
**
*Step, name=Rolling, nlgeom=YES
*Dynamic, Explicit
, 0.75
*Bulk Viscosity
0.12, 1.2
** Mass Scaling: Semi-Automatic
**               Whole Model
*Fixed Mass Scaling, dt=5e-06, type=below min
**
** BOUNDARY CONDITIONS
**
** Name: BC_Lower_NoSpin_ClampHold Type: 位移/转角
*Boundary, op=NEW
** Name: BC_Lower_RP_Support Type: 位移/转角
*Boundary, op=NEW
RP_LowerRoller, 1, 1
RP_LowerRoller, 2, 2
RP_LowerRoller, 3, 3
RP_LowerRoller, 4, 4
RP_LowerRoller, 5, 5
** Name: BC_Lower_Rotation Type: 速度/角速度
*Boundary, op=NEW, amplitude=Amp_Rolling_Spin, type=VELOCITY
RP_LowerRoller, 6, 6, -0.166667
** Name: BC_Upper_NoSpin_ClampHold Type: 位移/转角
*Boundary, op=NEW
** Name: BC_Upper_RP_Drop Type: 位移/转角
*Boundary, op=NEW, amplitude=Amp_Clamp_Drop
RP_UpperRoller, 2, 2, -0.015
** Name: BC_Upper_RP_LateralSupport Type: 位移/转角
*Boundary, op=NEW
RP_UpperRoller, 1, 1
RP_UpperRoller, 3, 3
RP_UpperRoller, 4, 4
RP_UpperRoller, 5, 5
** Name: BC_Upper_Rotation Type: 速度/角速度
*Boundary, op=NEW, amplitude=Amp_Rolling_Spin, type=VELOCITY
RP_UpperRoller, 6, 6, 0.266667
**
** OUTPUT REQUESTS
**
*Restart, write, number interval=1, time marks=NO
**
** FIELD OUTPUT: F_Sheet_StressStrain
**
*Output, field, number interval=80
*Node Output, nset=Sheet_All, variable=PRESELECT
*Element Output, elset=Sheet_All, directions=YES
LE, PE, PEEQ, PRESS, S
*Contact Output, variable=PRESELECT
**
** HISTORY OUTPUT: H-Output-1
**
*Output, history, variable=PRESELECT
**
** HISTORY OUTPUT: H_Energy
**
*Output, history, time interval=0.003
*Energy Output
ALLAE, ALLIE, ALLKE, ALLMW, ALLPD, ALLSE, ALLWK
**
** HISTORY OUTPUT: H_LowerRoller_RP
**
*Node Output, nset=RP_LowerRoller
RF1, RF2, RF3, RM3, U2, UR3, VR3
**
** HISTORY OUTPUT: H_UpperRoller_RP
**
*Node Output, nset=RP_UpperRoller
RF1, RF2, RF3, RM3, U2, UR3, VR3
*End Step
