*Heading
 3D explicit staged clamp-then-roll model for a self-supporting coating film
** Job name: RollPress_3D_SelfSupport_DiffSpeed_DPC_S00008B5_50mm_Roll2mm_RigidRoller_Stable Model name: RollPress_3D_SelfSupport_DiffSpeed_DPC_S00008B5_50mm_Roll2mm_RigidRoller_Stable
** Generated by: Abaqus/CAE 2025
*Preprint, echo=NO, model=NO, history=NO, contact=NO
**
** PARTS
**
*Part, name=ActiveLayer
*Node
      1,          -1.,  0.150000006,         100.
      2,          -1.,  0.150000006,           0.
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*Element, type=C3D8R
   1,  240, 1867, 6313, 1771,    1,   29,  835,  130
   2, 1867, 1868, 6314, 6313,   29,   30,  836,  835
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*Nset, nset=_PickedSet12, internal, generate
     1,  14268,      1
*Elset, elset=_PickedSet12, internal, generate
     1,  11400,      1
*Elset, elset=_Top_S6, internal, generate
 10801,  11396,      5
*Elset, elset=_Top_S2, internal
    1,    2,    3,    4,    5,    6
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*Elset, elset=_Top_S1, internal, generate
 7081,  7600,     1
*Surface, type=ELEMENT, name=Top
_Top_S6, S6
_Top_S2, S2
_Top_S1, S1
*Elset, elset=_Bottom_S1, internal
  2081,  2082,  2083,  2084,  2085,  2086
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*Elset, elset=_Bottom_S4, internal, generate
 10805,  11400,      5
*Elset, elset=_Bottom_S2, internal, generate
 5001,  5520,     1
*Surface, type=ELEMENT, name=Bottom
_Bottom_S1, S1
_Bottom_S4, S4
_Bottom_S2, S2
*Elset, elset=_Front_S2, internal, generate
 10801,  11000,      1
*Surface, type=ELEMENT, name=Front
_Front_S2, S2
*Elset, elset=_Back_S5, internal
  9801,  9802,  9803,  9804,  9805,  9806
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*Surface, type=ELEMENT, name=Back
_Back_S5, S5
** Section: Sec_ActiveLayer
*Solid Section, elset=_PickedSet12, material=ActiveLayer_Porous_Calibratable
,
*End Part
**
*Part, name=RigidRoller_CylindricalShell
*Node
      1,   48.5470924,  -11.9657831,         140.
      2,   44.2728004,  -23.2361584,         140.
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*Element, type=R3D4
  1,  26,   1,  27,  52
  2,   1,   2,  28,  27
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*Elset, elset=_ContactFace_SPOS, internal, generate
   1,  312,    1
*Surface, type=ELEMENT, name=ContactFace
_ContactFace_SPOS, SPOS
*End Part
**
**
** ASSEMBLY
**
*Assembly, name=Assembly
**
*Instance, name=ActiveLayer-1, part=ActiveLayer
          0.,           0.,         -50.
*End Instance
**
*Instance, name=LowerRoller-1, part=RigidRoller_CylindricalShell
          0.,         -50.,         -70.
*End Instance
**
*Instance, name=UpperRoller-1, part=RigidRoller_CylindricalShell
          0.,        50.15,         -70.
*End Instance
**
*Node
      1,           0.,   50.1500015,           0.
*Node
      2,           0.,         -50.,           0.
*Elset, elset=MassScale_Active_Critical, instance=ActiveLayer-1, generate
     1,  11400,      1
*Nset, nset=RP_LowerRoller
 2,
*Nset, nset=RP_UpperRoller
 1,
*Nset, nset=Sheet_Active, instance=ActiveLayer-1, generate
     1,  14268,      1
*Elset, elset=Sheet_Active, instance=ActiveLayer-1, generate
     1,  11400,      1
*Nset, nset=Sheet_All, instance=ActiveLayer-1, generate
     1,  14268,      1
*Elset, elset=Sheet_All, instance=ActiveLayer-1, generate
     1,  11400,      1
*Nset, nset=_PickedSet17, internal, instance=UpperRoller-1, generate
   1,  338,    1
*Elset, elset=_PickedSet17, internal, instance=UpperRoller-1, generate
   1,  312,    1
*Nset, nset=_PickedSet18, internal, instance=LowerRoller-1, generate
   1,  338,    1
*Elset, elset=_PickedSet18, internal, instance=LowerRoller-1, generate
   1,  312,    1
*Elset, elset=_Sheet_BackFace_S5, internal, instance=ActiveLayer-1
  9801,  9802,  9803,  9804,  9805,  9806
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*Surface, type=ELEMENT, name=Sheet_BackFace
_Sheet_BackFace_S5, S5
*Elset, elset=_Sheet_FrontFace_S2, internal, instance=ActiveLayer-1, generate
 10801,  11000,      1
*Surface, type=ELEMENT, name=Sheet_FrontFace
_Sheet_FrontFace_S2, S2
** Constraint: Rigid_LowerRoller
*Rigid Body, ref node=RP_LowerRoller, elset=_PickedSet18
** Constraint: Rigid_UpperRoller
*Rigid Body, ref node=RP_UpperRoller, elset=_PickedSet17
*End Assembly
*Amplitude, name=Amp_Clamp_Drop, time=TOTAL TIME, definition=SMOOTH STEP
             0.,              0.,           0.005,              1.,           0.175,              1.
*Amplitude, name=Amp_Rolling_Spin, definition=SMOOTH STEP
             0.,              0.,            0.01,              1.,            0.15,              1.
**
** MATERIALS
**
*Material, name=ActiveLayer_Porous_Calibratable
*Cap Plasticity
 0.0032,    5.,   0.8, 0.048,  0.02,    1.
*Cap Hardening
  0.048,   0.
 0.0496, 0.05
 0.0528,  0.1
 0.0576, 0.15
  0.064, 0.18
  0.072,  0.2
  0.088, 0.22
  0.112, 0.24
  0.152, 0.26
  0.216, 0.28
  0.312,  0.3
  0.384, 0.31
   0.48, 0.32
  0.592, 0.33
*Density
 2.55e-09,
*Elastic
6500., 0.01
**
** INTERACTION PROPERTIES
**
*Surface Interaction, name=Contact_Roller_Active_mu0p1
*Friction
 0.1,
*Surface Behavior, pressure-overclosure=HARD
**
** BOUNDARY CONDITIONS
**
** Name: BC_Lower_RP_Support Type: 位移/转角
*Boundary
RP_LowerRoller, 1, 1
RP_LowerRoller, 2, 2
RP_LowerRoller, 3, 3
RP_LowerRoller, 4, 4
RP_LowerRoller, 5, 5
** Name: BC_Upper_RP_LateralSupport Type: 位移/转角
*Boundary
RP_UpperRoller, 1, 1
RP_UpperRoller, 3, 3
RP_UpperRoller, 4, 4
RP_UpperRoller, 5, 5
**
** INTERACTIONS
**
** Interaction: GeneralContact_RollerFilm
*Contact, op=NEW
*Contact Inclusions, ALL EXTERIOR
*Contact Property Assignment
 ,  , Contact_Roller_Active_mu0p1
** ----------------------------------------------------------------
**
** STEP: Clamp_Down
**
*Step, name=Clamp_Down, nlgeom=YES
*Dynamic, Explicit
, 0.005
*Bulk Viscosity
0.12, 1.2
**
** BOUNDARY CONDITIONS
**
** Name: BC_Lower_NoSpin_ClampHold Type: 位移/转角
*Fixed Mass Scaling, type=below min, dt=5e-06, elset=MassScale_Active_Critical
*Boundary
RP_LowerRoller, 6, 6
** Name: BC_Upper_NoSpin_ClampHold Type: 位移/转角
*Boundary
RP_UpperRoller, 6, 6
** Name: BC_Upper_RP_Drop Type: 位移/转角
*Boundary, amplitude=Amp_Clamp_Drop
RP_UpperRoller, 2, 2, -0.015
**
** LOADS
**
** Name: Load_Back_Tension   Type: Surface traction
*Dsload, follower=NO
Sheet_BackFace, TRVEC, 0.01, -1., 0., 0.
** Name: Load_Front_Tension   Type: Surface traction
*Dsload, follower=NO
Sheet_FrontFace, TRVEC, 0.01, 1., 0., 0.
**
** OUTPUT REQUESTS
**
*Restart, write, number interval=1, time marks=NO
**
** FIELD OUTPUT: F_Sheet_StressStrain
**
*Output, field, number interval=80
*Node Output, nset=Sheet_All, variable=PRESELECT
*Element Output, elset=Sheet_All, directions=YES
LE, PE, PEEQ, S
*Contact Output, variable=PRESELECT
**
** HISTORY OUTPUT: H-Output-1
**
*Output, history, variable=PRESELECT
**
** HISTORY OUTPUT: H_Energy
**
*Output, history, time interval=2e-05
*Energy Output
ALLAE, ALLIE, ALLKE, ALLMW, ALLPD, ALLSE, ALLWK
**
** HISTORY OUTPUT: H_LowerRoller_RP
**
*Node Output, nset=RP_LowerRoller
RF1, RF2, RF3, RM3, U2, UR3, VR3
**
** HISTORY OUTPUT: H_UpperRoller_RP
**
*Node Output, nset=RP_UpperRoller
RF1, RF2, RF3, RM3, U2, UR3, VR3
*End Step
** ----------------------------------------------------------------
**
** STEP: Hold_Clamp
**
*Step, name=Hold_Clamp, nlgeom=YES
*Dynamic, Explicit
, 0.02
*Bulk Viscosity
0.12, 1.2
**
** OUTPUT REQUESTS
**
*Restart, write, number interval=1, time marks=NO
**
** FIELD OUTPUT: F_Sheet_StressStrain
**
*Output, field, number interval=80
*Node Output, nset=Sheet_All, variable=PRESELECT
*Element Output, elset=Sheet_All, directions=YES
LE, PE, PEEQ, S
*Contact Output, variable=PRESELECT
**
** HISTORY OUTPUT: H-Output-1
**
*Output, history, variable=PRESELECT
**
** HISTORY OUTPUT: H_Energy
**
*Output, history, time interval=8e-05
*Energy Output
ALLAE, ALLIE, ALLKE, ALLMW, ALLPD, ALLSE, ALLWK
**
** HISTORY OUTPUT: H_LowerRoller_RP
**
*Node Output, nset=RP_LowerRoller
RF1, RF2, RF3, RM3, U2, UR3, VR3
**
** HISTORY OUTPUT: H_UpperRoller_RP
**
*Node Output, nset=RP_UpperRoller
RF1, RF2, RF3, RM3, U2, UR3, VR3
*End Step
** ----------------------------------------------------------------
**
** STEP: Rolling
**
*Step, name=Rolling, nlgeom=YES
*Dynamic, Explicit
, 0.15
*Bulk Viscosity
0.12, 1.2
**
** BOUNDARY CONDITIONS
**
** Name: BC_Lower_NoSpin_ClampHold Type: 位移/转角
*Boundary, op=NEW
** Name: BC_Lower_RP_Support Type: 位移/转角
*Boundary, op=NEW
RP_LowerRoller, 1, 1
RP_LowerRoller, 2, 2
RP_LowerRoller, 3, 3
RP_LowerRoller, 4, 4
RP_LowerRoller, 5, 5
** Name: BC_Lower_Rotation Type: 速度/角速度
*Boundary, op=NEW, amplitude=Amp_Rolling_Spin, type=VELOCITY
RP_LowerRoller, 6, 6, -0.166667
** Name: BC_Upper_NoSpin_ClampHold Type: 位移/转角
*Boundary, op=NEW
** Name: BC_Upper_RP_Drop Type: 位移/转角
*Boundary, op=NEW, amplitude=Amp_Clamp_Drop
RP_UpperRoller, 2, 2, -0.015
** Name: BC_Upper_RP_LateralSupport Type: 位移/转角
*Boundary, op=NEW
RP_UpperRoller, 1, 1
RP_UpperRoller, 3, 3
RP_UpperRoller, 4, 4
RP_UpperRoller, 5, 5
** Name: BC_Upper_Rotation Type: 速度/角速度
*Boundary, op=NEW, amplitude=Amp_Rolling_Spin, type=VELOCITY
RP_UpperRoller, 6, 6, 0.266667
**
** OUTPUT REQUESTS
**
*Restart, write, number interval=1, time marks=NO
**
** FIELD OUTPUT: F_Sheet_StressStrain
**
*Output, field, number interval=80
*Node Output, nset=Sheet_All, variable=PRESELECT
*Element Output, elset=Sheet_All, directions=YES
LE, PE, PEEQ, S
*Contact Output, variable=PRESELECT
**
** HISTORY OUTPUT: H-Output-1
**
*Output, history, variable=PRESELECT
**
** HISTORY OUTPUT: H_Energy
**
*Output, history, time interval=0.0006
*Energy Output
ALLAE, ALLIE, ALLKE, ALLMW, ALLPD, ALLSE, ALLWK
**
** HISTORY OUTPUT: H_LowerRoller_RP
**
*Node Output, nset=RP_LowerRoller
RF1, RF2, RF3, RM3, U2, UR3, VR3
**
** HISTORY OUTPUT: H_UpperRoller_RP
**
*Node Output, nset=RP_UpperRoller
RF1, RF2, RF3, RM3, U2, UR3, VR3
*End Step
